# OpenSim document version 40500
Model Full_Body_Walking_Model-Post_JMP_HTO6:
  gravity: 0 -9.80665 0
  length_units: meters
  force_units: N
  credits:
    Rice Computational Neuromechanics Lab (RCNL): B.J. Fregly, Geng Li, Spencer T. Williams, Claire V. Hammond, Marleny M. Vega, Di Ao, Robert M. Salati, Kayla M. Pariser, Mohammad S. Shourijeh, and Ayman W. Habib. This model was created for use in the RCNL Neuromusculoskeletal Modeling Pipeline software.
  publications:
    This full-body model is a modified version of the one provided with the following publications:
  Ground
  BodySet:
    Body pelvis: mass=11.38041 [kg] mass_center=(-0.0775261 0 0) inertia=(0.1194464 0.1012041 0.06727577 0 0 0)
        meshes=(r_pelvis.vtp l_pelvis.vtp sacrum.vtp)
      WrapCylinder Gmax1_at_pelvis_r: xyz_body_rotation=(-0.6 0.45 0) translation=(-0.08443437 -0.1085585 0.06688956)
          quadrant=-x radius=0.04386201 length=0.1644825
      WrapCylinder Gmax2_at_pelvis_r: xyz_body_rotation=(-0.75 0.39 0) translation=(-0.08772402 -0.09101367 0.07456541)
          quadrant=all radius=0.04386201 length=0.109655
      WrapCylinder Gmax3_at_pelvis_r: xyz_body_rotation=(-0.1 0 0) translation=(-0.09101367 -0.09649642 0.07456541)
          quadrant=all radius=0.04386201 length=0.109655
      WrapCylinder Gmax1_at_pelvis_l: xyz_body_rotation=(0.6 -0.45 0) translation=(-0.08443437 -0.1085585 -0.06688956)
          quadrant=-x radius=0.04386201 length=0.1644825
      WrapCylinder Gmax2_at_pelvis_l: xyz_body_rotation=(0.75 -0.39 0)
          translation=(-0.08772402 -0.09101367 -0.07456541) quadrant=all radius=0.04386201 length=0.109655
      WrapCylinder Gmax3_at_pelvis_l: xyz_body_rotation=(0.1 0 0) translation=(-0.09101367 -0.09649642 -0.07456541)
          quadrant=all radius=0.04386201 length=0.109655
      WrapCylinder PS_at_brim_r: xyz_body_rotation=(-0.25 -0.27 0.1) translation=(-0.08114472 -0.06579301 0.07193369)
          quadrant=-y radius=0.05482751 length=0.109655
      WrapCylinder PS_at_brim_l: xyz_body_rotation=(0.25 0.27 0.1) translation=(-0.08114472 -0.06579301 -0.07193369)
          quadrant=-y radius=0.05482751 length=0.109655
      WrapCylinder IL_at_brim_r: xyz_body_rotation=(-0.32 -0.24 0.9) translation=(-0.07785506 -0.07127576 0.0828992)
          quadrant=-y radius=0.06020061 length=0.109655
      WrapCylinder IL_at_brim_l: xyz_body_rotation=(0.32 0.24 0.9) translation=(-0.07785506 -0.07127576 -0.0828992)
          quadrant=-y radius=0.06020061 length=0.109655
    Body femur_r: mass=8.988172 mass_center=(0 -0.17694 0) inertia=(0.140171 0.03674384 0.1478128 0 0 0)
        meshes=r_femur.vtp
      WrapCylinder GasLat_at_condyles_r: translation=(0.005204119 -0.4267377 0) quadrant=all radius=0.02706142
          length=0.1040824
      WrapCylinder GasMed_at_condyles_r: translation=(0.005204119 -0.4267377 0) quadrant=all radius=0.02602059
          length=0.1040824
      WrapCylinder KnExt_at_fem_r: xyz_body_rotation=(-0.0623366 0.0507601 0)
          translation=(0.003734767 -0.419173 0.002176477) quadrant=all radius=0.02602059 length=0.1040824
      WrapCylinder KnExtVL_at_fem_r: xyz_body_rotation=(-0.0623366 0.0507601 0)
          translation=(0.001965367 -0.419173 0.002176477) quadrant=all radius=0.02602059 length=0.1040824
      WrapCylinder AB_at_femshaft_r: xyz_body_rotation=(1.66157 0.186644 0)
          translation=(0.0152412 -0.1171915 0.02431885) quadrant=all radius=0.01717359 length=0.07285766
      WrapCylinder AL_at_femshaft_r: xyz_body_rotation=(1.77711 0.136489 0)
          translation=(0.03198732 -0.2413764 0.0157307) quadrant=all radius=0.02092056 length=0.1040824
      WrapCylinder AMprox_at_femshaft_r: xyz_body_rotation=(1.61126 0.18656 0)
          translation=(0.005394579 -0.07587064 0.02644005) quadrant=all radius=0.02196138 length=0.07285766
      WrapCylinder AMmid_at_femshaft_r: xyz_body_rotation=(1.61139 0.13656 0)
          translation=(0.02395196 -0.1672718 0.02142452) quadrant=all radius=0.02227363 length=0.1248988
      WrapCylinder AMdist_at_femshaft_r: xyz_body_rotation=(1.71188 0.186636 0)
          translation=(0.0328968 -0.2713802 0.009746898) quadrant=all radius=0.02268996 length=0.2081647
      WrapCylinder AMisch_at_condyles_r: xyz_body_rotation=(1.71115 -0.463363 0)
          translation=(-0.0235758 -0.3922147 -0.003283143) quadrant=all radius=0.04163295 length=0.2497977
      WrapCylinder PECT_at_femshaft_r: xyz_body_rotation=(1.81295 0.276344 0)
          translation=(0.006334172 -0.08795263 0.0316832) quadrant=all radius=0.01561236 length=0.05204119
    Body patella_r: mass=0.08329718 mass_center=(0.001873483 0.02747775 0)
        inertia=(3.004411e-6 1.372398e-5 1.372398e-5 0 0 0) meshes=r_patella.vtp
    Body proximal_tibia_r: mass=9.663246e-9 mass_center=(0 0 0) inertia=(1.032283e-8 1.032283e-8 1.032283e-8 0 0 0)
        meshes=r_tibia.vtp
    Body tibia_r: mass=3.582649 mass_center=(0 -0.1929666 0) inertia=(0.05202705 0.005264642 0.05274965 0 0 0)
        meshes=(r_tibia.vtp r_fibula.vtp)
      WrapCylinder GasLat_at_shank_r: xyz_body_rotation=(2.96723 -0.279725 -1.47812)
          translation=(-0.007648381 -0.07648381 -0.003410765) quadrant=-y radius=0.05684608 length=0.1033565
      WrapCylinder GasMed_at_shank_r: xyz_body_rotation=(2.96723 0.0279725 -1.47812)
          translation=(-0.007648381 -0.07648381 -0.003410765) quadrant=-y radius=0.06098034 length=0.1033565
      WrapCylinder GR_at_condyles_r: xyz_body_rotation=(0 -0.4 0) translation=(-0.003100695 -0.0206713 0) quadrant=all
          radius=0.03720834 length=0.1033565
      WrapCylinder SM_at_condyles_r: xyz_body_rotation=(0 -0.1 0) translation=(-0.001033565 -0.0206713 0) quadrant=all
          radius=0.03565799 length=0.1033565
      WrapCylinder ST_at_condyles_r: xyz_body_rotation=(0 -0.2 0) translation=(-0.00206713 -0.02118808 0) quadrant=all
          radius=0.04392651 length=0.1033565
      WrapCylinder BF_at_gastroc_r: translation=(-0.04030904 -0.0620139 0) quadrant=y radius=0.02997339
          length=0.1550348
    Body pretalus_r: mass=9.663246e-9 mass_center=(0 0 0) inertia=(9.663246e-9 9.663246e-9 9.663246e-9 0 0 0)
    Body talus_r: mass=0.09663246 mass_center=(0 0 0) inertia=(0.001005021 0.001005021 0.001005021 0 0 0)
        meshes=r_talus.stl
    Body calcn_r: mass=1.207906 mass_center=(0.1019826 0.03059477 0)
        inertia=(0.001407029 0.003919581 0.004120585 0 0 0) meshes=r_foot.vtp
    Body toes_r: mass=0.2093059 mass_center=(0.03528597 0.006118955 -0.01784695)
        inertia=(0.0001005021 0.0002010042 0.001005021 0 0 0) meshes=r_bofoot.vtp
    Body femur_l: mass=8.988172 mass_center=(0 -0.1789618 0) inertia=(0.1433925 0.03758833 0.15121 0 0 0)
        meshes=l_femur.vtp
      WrapCylinder GasLat_at_condyles_l: translation=(0.005263583 -0.4316138 0) quadrant=all radius=0.02737063
          length=0.1052717
      WrapCylinder GasMed_at_condyles_l: translation=(0.005263583 -0.4316138 0) quadrant=all radius=0.02631791
          length=0.1052717
      WrapCylinder KnExt_at_fem_l: xyz_body_rotation=(0.0623366 -0.0507601 0)
          translation=(0.003777442 -0.4239626 -0.002201346) quadrant=all radius=0.02631791 length=0.1052717
      WrapCylinder KnExtVL_at_fem_l: xyz_body_rotation=(0.0623366 -0.0507601 0)
          translation=(0.001987824 -0.4239626 -0.002201346) quadrant=all radius=0.02631791 length=0.1052717
      WrapCylinder AB_at_femshaft_l: xyz_body_rotation=(-1.66157 -0.186644 0)
          translation=(0.01541535 -0.1185306 -0.02459672) quadrant=all radius=0.01736982 length=0.07369016
      WrapCylinder AL_at_femshaft_l: xyz_body_rotation=(-1.77711 -0.136489 0)
          translation=(0.03235282 -0.2441344 -0.01591044) quadrant=all radius=0.0211596 length=0.1052717
      WrapCylinder AMprox_at_femshaft_l: xyz_body_rotation=(-1.61126 -0.18656 0)
          translation=(0.005456219 -0.07673756 -0.02674216) quadrant=all radius=0.02221232 length=0.07369016
      WrapCylinder AMmid_at_femshaft_l: xyz_body_rotation=(-1.61139 -0.13656 0)
          translation=(0.02422564 -0.1691831 -0.02166933) quadrant=all radius=0.02252813 length=0.126326
      WrapCylinder AMdist_at_femshaft_l: xyz_body_rotation=(-1.71188 -0.186636 0)
          translation=(0.03327269 -0.2744811 -0.009858269) quadrant=all radius=0.02294922 length=0.2105433
      WrapCylinder AMisch_at_condyles_l: xyz_body_rotation=(-1.71115 0.463363 0)
          translation=(-0.02384519 -0.3966962 0.003320657) quadrant=all radius=0.04210866 length=0.252652
      WrapCylinder PECT_at_femshaft_l: xyz_body_rotation=(-1.81295 -0.276344 0)
          translation=(0.006406549 -0.0889576 -0.03204522) quadrant=all radius=0.01579075 length=0.05263583
    Body patella_l: mass=0.08329718 mass_center=(0.00189489 0.02779172 0)
        inertia=(3.073462e-6 1.40394e-5 1.40394e-5 0 0 0) meshes=l_patella.vtp
    Body proximal_tibia_l: mass=9.663246e-9 mass_center=(0 0 0) inertia=(1.005584e-8 1.005584e-8 1.005584e-8 0 0 0)
        meshes=l_tibia.vtp
    Body tibia_l: mass=3.582649 mass_center=(0 -0.1904549 0) inertia=(0.05068145 0.00512848 0.05138536 0 0 0)
        meshes=(l_tibia.vtp l_fibula.vtp)
      WrapCylinder GasLat_at_shank_l: xyz_body_rotation=(-2.96723 0.279725 -1.47812)
          translation=(-0.007548826 -0.07548826 0.003366369) quadrant=-y radius=0.05610614 length=0.1020112
      WrapCylinder GasMed_at_shank_l: xyz_body_rotation=(-2.96723 -0.0279725 -1.47812)
          translation=(-0.007548826 -0.07548826 0.003366369) quadrant=-y radius=0.06018659 length=0.1020112
      WrapCylinder GR_at_condyles_l: xyz_body_rotation=(0 0.4 0) translation=(-0.003060335 -0.02040223 0) quadrant=all
          radius=0.03672402 length=0.1020112
      WrapCylinder SM_at_condyles_l: xyz_body_rotation=(0 0.1 0) translation=(-0.001020112 -0.02040223 0) quadrant=all
          radius=0.03519385 length=0.1020112
      WrapCylinder ST_at_condyles_l: xyz_body_rotation=(0 0.2 0) translation=(-0.002040223 -0.02091229 0) quadrant=all
          radius=0.04335475 length=0.1020112
      WrapCylinder BF_at_gastroc_l: translation=(-0.03978436 -0.0612067 0) quadrant=all radius=0.02958324
          length=0.1530168
    Body pretalus_l: mass=9.663246e-9 mass_center=(0 0 0) inertia=(9.663246e-9 9.663246e-9 9.663246e-9 0 0 0)
    Body talus_l: mass=0.09663246 mass_center=(0 0 0) inertia=(0.001005021 0.001005021 0.001005021 0 0 0)
        meshes=l_talus.stl
    Body calcn_l: mass=1.207906 mass_center=(0.1019826 0.03059477 0)
        inertia=(0.001407029 0.003919581 0.004120585 0 0 0) meshes=l_foot.vtp
    Body toes_l: mass=0.2093059 mass_center=(0.03528597 0.006118955 0.01784695)
        inertia=(0.0001005021 0.0002010042 0.001005021 0 0 0) meshes=l_bofoot.vtp
    Body torso: mass=25.9232 mass_center=(-0.027 0.288 0) inertia=(1.154125 0.5913472 1.12039 0 0 0)
        meshes=(hat_spine.vtp hat_jaw.vtp hat_skull.vtp hat_ribs_scap.vtp)
    Body humerus_r: mass=1.964055 mass_center=(0 -0.1809522 0) inertia=(0.01396789 0.004818491 0.01567851 0 0 0)
        meshes=humerus_rv.vtp
    Body ulna_r: mass=0.5870422 mass_center=(0 -0.1266604 0) inertia=(0.003161078 0.0006595362 0.003428948 0 0 0)
        meshes=ulna_rv.vtp
    Body radius_r: mass=0.5870422 mass_center=(0 -0.1266604 0) inertia=(0.003161078 0.0006595362 0.003428948 0 0 0)
        meshes=radius_rv.vtp
    Body hand_r: mass=0.4420935 mass_center=(0 -0.07156139 0) inertia=(0.0009519519 0.0005837642 0.001430062 0 0 0)
        meshes=(pisiform_rvs.vtp lunate_rvs.vtp scaphoid_rvs.vtp triquetrum_rvs.vtp hamate_rvs.vtp capitate_rvs.vtp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)
    Body humerus_l: mass=1.964055 mass_center=(0 -0.1809522 0) inertia=(0.01396789 0.004818491 0.01567851 0 0 0)
        meshes=humerus_lv.vtp
    Body ulna_l: mass=0.5870422 mass_center=(0 -0.1266604 0) inertia=(0.003161078 0.0006595362 0.003428948 0 0 0)
        meshes=ulna_lv.vtp
    Body radius_l: mass=0.5870422 mass_center=(0 -0.1266604 0) inertia=(0.003161078 0.0006595362 0.003428948 0 0 0)
        meshes=radius_lv.vtp
    Body hand_l: mass=0.4420935 mass_center=(0 -0.07156139 0) inertia=(0.0009519519 0.0005837642 0.001430062 0 0 0)
        meshes=(pisiform_lvs.vtp lunate_lvs.vtp scaphoid_lvs.vtp triquetrum_lvs.vtp hamate_lvs.vtp capitate_lvs.vtp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)
  JointSet:
    CustomJoint ground_pelvis: socket_parent_frame=ground_offset socket_child_frame=pelvis_offset
      Coordinate pelvis_tilt: default_value=-0.1079112 range=(-1.570796 1.570796) clamped=false
      Coordinate pelvis_list: default_value=-0.0083247 range=(-1.570796 1.570796) clamped=false
      Coordinate pelvis_rotation: default_value=0.005176131 range=(-6.283185 6.283185) clamped=false
      Coordinate pelvis_tx: default_value=1.042627 range=(-5 5) clamped=false
      Coordinate pelvis_ty: default_value=0.9754589 range=(-1 2) clamped=false
      Coordinate pelvis_tz: default_value=0.5105708 range=(-3 3) clamped=false
      PhysicalOffsetFrame ground_offset: socket_parent=/ground translation=(0 0 0) [meters]
      PhysicalOffsetFrame pelvis_offset: socket_parent=/bodyset/pelvis translation=(0 0 0)
      SpatialTransform:
        TransformAxis rotation1: coordinates=pelvis_tilt axis=(0 0 1) LinearFunction(coefficients=1 0)
        TransformAxis rotation2: coordinates=pelvis_list axis=(1 0 0) LinearFunction(coefficients=1 0)
        TransformAxis rotation3: coordinates=pelvis_rotation axis=(0 1 0) LinearFunction(coefficients=1 0)
        TransformAxis translation1: coordinates=pelvis_tx axis=(1 0 0) LinearFunction(coefficients=1 0)
        TransformAxis translation2: coordinates=pelvis_ty axis=(0 1 0) LinearFunction(coefficients=1 0)
        TransformAxis translation3: coordinates=pelvis_tz axis=(0 0 1) LinearFunction(coefficients=1 0)
    CustomJoint hip_r: socket_parent_frame=pelvis_offset socket_child_frame=femur_r_offset
      Coordinate hip_flexion_r: default_value=0.0861532 range=(-0.5235988 2.094395) clamped=false
      Coordinate hip_adduction_r: default_value=-0.05423752 range=(-0.8726646 0.5235988) clamped=false
      Coordinate hip_rotation_r: default_value=0.1212712 range=(-0.6981317 0.6981317) clamped=false
      PhysicalOffsetFrame pelvis_offset: socket_parent=/bodyset/pelvis translation=(-0.06170946 -0.08606823 0.08471947)
      PhysicalOffsetFrame femur_r_offset: socket_parent=/bodyset/femur_r translation=(0 0 0)
      SpatialTransform: axes_held_at_zero=(translation1 translation2 translation3)
        TransformAxis rotation1: coordinates=hip_flexion_r axis=(0 0 1) LinearFunction(coefficients=1 0)
        TransformAxis rotation2: coordinates=hip_adduction_r axis=(1 0 0) LinearFunction(coefficients=1 0)
        TransformAxis rotation3: coordinates=hip_rotation_r axis=(0 1 0) LinearFunction(coefficients=1 0)
    CustomJoint knee_r: socket_parent_frame=femur_r_offset socket_child_frame=proximal_tibia_r_offset
      Coordinate knee_angle_r: default_value=0.08412399 range=(0 2.443461) clamped=true
      Coordinate knee_frontal_r: default_value=0 range=(-1 1) clamped=true locked=true
      PhysicalOffsetFrame femur_r_offset: socket_parent=/bodyset/femur_r
          translation=(-0.004683707 -0.4263214 -0.001821442) orientation=(-0.07064948 0.003599456 0.1246163) [radians]
      PhysicalOffsetFrame proximal_tibia_r_offset: socket_parent=/bodyset/proximal_tibia_r
          translation=(-0.008361066 -0.003653446 -0.001534575) orientation=(-0.1772179 0.1475459 0.1246163)
      SpatialTransform:
        TransformAxis rotation1: coordinates=knee_angle_r axis=(0 0 -1) LinearFunction(coefficients=1 0)
        TransformAxis rotation2: coordinates=knee_frontal_r axis=(1 0 0) LinearFunction(coefficients=1 0)
        TransformAxis rotation3: coordinates=knee_angle_r axis=(0 1 0)
          PolynomialFunction: coefficients=(0.02516576 -0.1694801 0.3694993 -4.430358e-8)
        TransformAxis translation1: coordinates=knee_angle_r axis=(0 1 0)
          MultiplierFunction: scale=1.040824
            PolynomialFunction: coefficients=(-0.0005796878 0.005079766 -0.01144238 0.003936909 -2.51635e-5)
        TransformAxis translation2: coordinates=knee_angle_r axis=(1 0 0)
          MultiplierFunction: scale=1.040824
            PolynomialFunction: coefficients=(0.001208087 -0.004453611 0.0006116494 0.00626543 -1.461913e-5)
        TransformAxis translation3: coordinates=knee_angle_r axis=(0 0 -1)
          MultiplierFunction: scale=1.040824
            PolynomialFunction: coefficients=(0.0001590448 -0.00101515 0.001817511 2.641427e-5 -7.746564e-7)
    CustomJoint knee_load_r: socket_parent_frame=proximal_tibia_r_offset socket_child_frame=tibia_r_offset
      Coordinate knee_adduction_r: default_value=-0.0964 range=(-1 1) clamped=true locked=true
      PhysicalOffsetFrame proximal_tibia_r_offset: socket_parent=/bodyset/proximal_tibia_r translation=(0 0 0)
      PhysicalOffsetFrame tibia_r_offset: socket_parent=/bodyset/tibia_r translation=(0 0 0)
      SpatialTransform: axes_held_at_zero=(translation1 translation2 translation3)
        TransformAxis rotation1: coordinates=knee_adduction_r axis=(1 0 0) LinearFunction(coefficients=1 0)
        TransformAxis rotation2: axis=(0 1 0)
        TransformAxis rotation3: axis=(0 0 1)
    CustomJoint patellofemoral_r: socket_parent_frame=femur_r_offset socket_child_frame=patella_r_offset
      Coordinate knee_angle_r_beta: default_value=0.08412399 range=(-99999.9 99999.9) clamped=false
      PhysicalOffsetFrame femur_r_offset: socket_parent=/bodyset/femur_r
          translation=(-0.008420264 -0.4246145 -0.002862265)
      PhysicalOffsetFrame patella_r_offset: socket_parent=/bodyset/patella_r translation=(0 0 0)
      SpatialTransform: axes_held_at_zero=(rotation2 rotation3)
        TransformAxis rotation1: coordinates=knee_angle_r_beta axis=(0 0 1)
          SimmSpline: x=(0 0.174533 0.349066 0.523599 0.698132 0.872665 1.0472 1.22173 1.39626 1.5708 1.74533 1.91986 2.0944)
              y=(0.00113686 -0.00629212 -0.105582 -0.253683 -0.414245 -0.579047 -0.747244 -0.91799 -1.09044 -1.26379 -1.43763 -1.61186 -1.78634)
        TransformAxis translation1: coordinates=knee_angle_r_beta axis=(1 0 0)
          MultiplierFunction: scale=1.040824
            SimmSpline: x=(0 0.174533 0.349066 0.523599 0.698132 0.872665 1.0472 1.22173 1.39626 1.5708 1.74533 1.91986 2.0944)
                y=(0.0524 0.0488 0.0437 0.0371 0.0296 0.0216 0.0136 0.0057 -0.0019 -0.0088 -0.0148 -0.0196 -0.0227)
        TransformAxis translation2: coordinates=knee_angle_r_beta axis=(0 1 0)
          MultiplierFunction: scale=1.040824
            SimmSpline: x=(0 0.174533 0.349066 0.523599 0.698132 0.872665 1.0472 1.22173 1.39626 1.5708 1.74533 1.91986 2.0944)
                y=(-0.0108 -0.019 -0.0263 -0.0322 -0.0367 -0.0395 -0.0408 -0.0404 -0.0384 -0.0349 -0.0301 -0.0245 -0.0187)
        TransformAxis translation3: axis=(0 0 1) MultiplierFunction(scale=1.040824, Constant(value=0.00275))
    PinJoint ankle_r: socket_parent_frame=tibia_r_offset socket_child_frame=pretalus_r_offset
      Coordinate ankle_angle_r: default_value=0.09713486 range=(-0.8727 0.8727) clamped=false
      PhysicalOffsetFrame tibia_r_offset: socket_parent=/bodyset/tibia_r translation=(-0.01090825 -0.413426 0)
          orientation=(0.1846251 -0.1090212 0)
      PhysicalOffsetFrame pretalus_r_offset: socket_parent=/bodyset/pretalus_r translation=(0 0 0)
    WeldJoint pretalar_r: socket_parent_frame=pretalus_r_offset socket_child_frame=talus_r_offset
      PhysicalOffsetFrame pretalus_r_offset: socket_parent=/bodyset/pretalus_r translation=(0 0 0)
          orientation=(0 0 0.69513)
      PhysicalOffsetFrame talus_r_offset: socket_parent=/bodyset/talus_r translation=(0 0 0)
    CustomJoint subtalar_r: socket_parent_frame=talus_r_offset socket_child_frame=calcn_r_offset
      Coordinate subtalar_angle_r: default_value=0.02498637 range=(-0.3491 0.6981) clamped=false
      PhysicalOffsetFrame talus_r_offset: socket_parent=/bodyset/talus_r translation=(0 -0.007271358 0.001422657)
          orientation=(0 0.334632 0)
      PhysicalOffsetFrame calcn_r_offset: socket_parent=/bodyset/calcn_r
          translation=(0.05425473 0.03712166 -0.008464554) orientation=(0 0.200661 0.6900221)
      SpatialTransform: axes_held_at_zero=(rotation2 rotation3 translation1 translation2 translation3)
        TransformAxis rotation1: coordinates=subtalar_angle_r axis=(1 0 0) LinearFunction(coefficients=1 0)
    PinJoint mtp_r: socket_parent_frame=calcn_r_offset socket_child_frame=toes_r_offset
      Coordinate mtp_angle_r: default_value=-0.1714641 range=(-0.7853982 0.5235988) clamped=true
      PhysicalOffsetFrame calcn_r_offset: socket_parent=/bodyset/calcn_r
          translation=(0.1823449 -0.002039652 0.001101412) orientation=(-3.141593 0.619901 0)
      PhysicalOffsetFrame toes_r_offset: socket_parent=/bodyset/toes_r translation=(0 0 0)
          orientation=(-3.14159 0.619901 0)
    CustomJoint hip_l: socket_parent_frame=pelvis_offset socket_child_frame=femur_l_offset
      Coordinate hip_flexion_l: default_value=0.08687882 range=(-0.5235988 2.094395) clamped=false
      Coordinate hip_adduction_l: default_value=-0.1064364 range=(-0.8726646 0.5235988) clamped=false
      Coordinate hip_rotation_l: default_value=0.1398505 range=(-0.6981317 0.6981317) clamped=false
      PhysicalOffsetFrame pelvis_offset: socket_parent=/bodyset/pelvis
          translation=(-0.06170946 -0.08606823 -0.08471947)
      PhysicalOffsetFrame femur_l_offset: socket_parent=/bodyset/femur_l translation=(0 0 0)
      SpatialTransform: axes_held_at_zero=(translation1 translation2 translation3)
        TransformAxis rotation1: coordinates=hip_flexion_l axis=(0 0 1) LinearFunction(coefficients=1 0)
        TransformAxis rotation2: coordinates=hip_adduction_l axis=(1 0 0) LinearFunction(coefficients=-1 0)
        TransformAxis rotation3: coordinates=hip_rotation_l axis=(0 1 0) LinearFunction(coefficients=-1 0)
    CustomJoint knee_l: socket_parent_frame=femur_l_offset socket_child_frame=proximal_tibia_l_offset
      Coordinate knee_angle_l: default_value=0.08652591 range=(0 2.443461) clamped=true
      Coordinate knee_frontal_l: default_value=0 range=(-1 1) clamped=true locked=true
      PhysicalOffsetFrame femur_l_offset: socket_parent=/bodyset/femur_l
          translation=(-0.004737224 -0.4311927 0.001842254) orientation=(0.06354266 -4.33272e-5 0.1246163)
      PhysicalOffsetFrame proximal_tibia_l_offset: socket_parent=/bodyset/proximal_tibia_l
          translation=(-0.008252234 -0.003605891 0.001514601) orientation=(0.169654 -0.1179429 0.1246163)
      SpatialTransform:
        TransformAxis rotation1: coordinates=knee_angle_l axis=(0 0 -1) LinearFunction(coefficients=1 0)
        TransformAxis rotation2: coordinates=knee_frontal_l axis=(-1 0 0) LinearFunction(coefficients=1 0)
        TransformAxis rotation3: coordinates=knee_angle_l axis=(0 -1 0)
          PolynomialFunction: coefficients=(0.02516576 -0.1694801 0.3694993 -4.430358e-8)
        TransformAxis translation1: coordinates=knee_angle_l axis=(0 1 0)
          MultiplierFunction: scale=1.052717
            PolynomialFunction: coefficients=(-0.0005796878 0.005079766 -0.01144238 0.003936909 -2.51635e-5)
        TransformAxis translation2: coordinates=knee_angle_l axis=(-1 0 0)
          MultiplierFunction: scale=1.052717
            PolynomialFunction: coefficients=(-0.001208087 0.004453611 -0.0006116494 -0.00626543 1.461913e-5)
        TransformAxis translation3: coordinates=knee_angle_l axis=(0 0 1)
          MultiplierFunction: scale=1.052717
            PolynomialFunction: coefficients=(0.0001590448 -0.00101515 0.001817511 2.641427e-5 -7.746564e-7)
    CustomJoint knee_load_l: socket_parent_frame=proximal_tibia_l_offset socket_child_frame=tibia_l_offset
      Coordinate knee_adduction_l: default_value=-0.1133 range=(-1 1) clamped=true locked=true
      PhysicalOffsetFrame proximal_tibia_l_offset: socket_parent=/bodyset/proximal_tibia_l translation=(0 0 0)
      PhysicalOffsetFrame tibia_l_offset: socket_parent=/bodyset/tibia_l translation=(0 0 0)
      SpatialTransform: axes_held_at_zero=(translation1 translation2 translation3)
        TransformAxis rotation1: coordinates=knee_adduction_l axis=(-1 0 0) LinearFunction(coefficients=1 0)
        TransformAxis rotation2: axis=(0 1 0)
        TransformAxis rotation3: axis=(0 0 1)
    CustomJoint patellofemoral_l: socket_parent_frame=femur_l_offset socket_child_frame=patella_l_offset
      Coordinate knee_angle_l_beta: default_value=0.08652591 range=(-99999.9 99999.9) clamped=false
      PhysicalOffsetFrame femur_l_offset: socket_parent=/bodyset/femur_l
          translation=(-0.008516477 -0.4294662 0.00289497)
      PhysicalOffsetFrame patella_l_offset: socket_parent=/bodyset/patella_l translation=(0 0 0)
      SpatialTransform: axes_held_at_zero=(rotation2 rotation3)
        TransformAxis rotation1: coordinates=knee_angle_l_beta axis=(0 0 1)
          SimmSpline: x=(0 0.174533 0.349066 0.523599 0.698132 0.872665 1.0472 1.22173 1.39626 1.5708 1.74533 1.91986 2.0944)
              y=(0.00113686 -0.00629212 -0.105582 -0.253683 -0.414245 -0.579047 -0.747244 -0.91799 -1.09044 -1.26379 -1.43763 -1.61186 -1.78634)
        TransformAxis translation1: coordinates=knee_angle_l_beta axis=(1 0 0)
          MultiplierFunction: scale=1.052717
            SimmSpline: x=(0 0.174533 0.349066 0.523599 0.698132 0.872665 1.0472 1.22173 1.39626 1.5708 1.74533 1.91986 2.0944)
                y=(0.0524 0.0488 0.0437 0.0371 0.0296 0.0216 0.0136 0.0057 -0.0019 -0.0088 -0.0148 -0.0196 -0.0227)
        TransformAxis translation2: coordinates=knee_angle_l_beta axis=(0 1 0)
          MultiplierFunction: scale=1.052717
            SimmSpline: x=(0 0.174533 0.349066 0.523599 0.698132 0.872665 1.0472 1.22173 1.39626 1.5708 1.74533 1.91986 2.0944)
                y=(-0.0108 -0.019 -0.0263 -0.0322 -0.0367 -0.0395 -0.0408 -0.0404 -0.0384 -0.0349 -0.0301 -0.0245 -0.0187)
        TransformAxis translation3: axis=(0 0 1) MultiplierFunction(scale=1.052717, Constant(value=-0.00275))
    PinJoint ankle_l: socket_parent_frame=tibia_l_offset socket_child_frame=pretalus_l_offset
      Coordinate ankle_angle_l: default_value=0.09770078 range=(-0.8727 0.8727) clamped=false
      PhysicalOffsetFrame tibia_l_offset: socket_parent=/bodyset/tibia_l translation=(-0.01076626 -0.4080447 0)
          orientation=(-0.2142841 0.1083857 0)
      PhysicalOffsetFrame pretalus_l_offset: socket_parent=/bodyset/pretalus_l translation=(0 0 0)
    WeldJoint pretalar_l: socket_parent_frame=pretalus_l_offset socket_child_frame=talus_l_offset
      PhysicalOffsetFrame pretalus_l_offset: socket_parent=/bodyset/pretalus_l translation=(0 0 0)
          orientation=(0 0 0.69513)
      PhysicalOffsetFrame talus_l_offset: socket_parent=/bodyset/talus_l translation=(0 0 0)
    CustomJoint subtalar_l: socket_parent_frame=talus_l_offset socket_child_frame=calcn_l_offset
      Coordinate subtalar_angle_l: default_value=0.02547817 range=(-0.3491 0.6981) clamped=false
      PhysicalOffsetFrame talus_l_offset: socket_parent=/bodyset/talus_l translation=(0 -0.007271358 -0.001422657)
          orientation=(0 -0.3272956 0)
      PhysicalOffsetFrame calcn_l_offset: socket_parent=/bodyset/calcn_l
          translation=(0.05425473 0.03712166 0.008464554) orientation=(0 -0.2327416 0.6842215)
      SpatialTransform: axes_held_at_zero=(rotation2 rotation3 translation1 translation2 translation3)
        TransformAxis rotation1: coordinates=subtalar_angle_l axis=(-1 0 0) LinearFunction(coefficients=1 0)
    PinJoint mtp_l: socket_parent_frame=calcn_l_offset socket_child_frame=toes_l_offset
      Coordinate mtp_angle_l: default_value=-0.1738798 range=(-0.7853982 0.5235988) clamped=true
      PhysicalOffsetFrame calcn_l_offset: socket_parent=/bodyset/calcn_l
          translation=(0.1823449 -0.002039652 -0.001101412) orientation=(-3.14159 -0.619901 0)
      PhysicalOffsetFrame toes_l_offset: socket_parent=/bodyset/toes_l translation=(0 0 0)
          orientation=(-3.14159 -0.619901 0)
    CustomJoint back: socket_parent_frame=pelvis_offset socket_child_frame=torso_offset
      Coordinate lumbar_extension: default_value=0.1139372 range=(-1.570796 1.570796) clamped=true
      Coordinate lumbar_bending: default_value=0.009021069 range=(-1.570796 1.570796) clamped=true
      Coordinate lumbar_rotation: default_value=-3.063715e-6 range=(-1.570796 1.570796) clamped=true
      PhysicalOffsetFrame pelvis_offset: socket_parent=/bodyset/pelvis translation=(-0.1104226 0.08936884 0)
      PhysicalOffsetFrame torso_offset: socket_parent=/bodyset/torso translation=(0 0 0)
      SpatialTransform: axes_held_at_zero=(translation1 translation2 translation3)
        TransformAxis rotation1: coordinates=lumbar_extension axis=(0 0 1) LinearFunction(coefficients=1 0)
        TransformAxis rotation2: coordinates=lumbar_bending axis=(1 0 0) LinearFunction(coefficients=1 0)
        TransformAxis rotation3: coordinates=lumbar_rotation axis=(0 1 0) LinearFunction(coefficients=1 0)
    CustomJoint acromial_r: socket_parent_frame=torso_offset socket_child_frame=humerus_r_offset
      Coordinate arm_flex_r: default_value=-0.1968423 range=(-1.570796 1.570796) clamped=true
      Coordinate arm_add_r: default_value=-0.2819917 range=(-2.094395 1.570796) clamped=true
      Coordinate arm_rot_r: default_value=-0.1003358 range=(-1.570796 1.570796) clamped=true
      PhysicalOffsetFrame torso_offset: socket_parent=/bodyset/torso translation=(0.0028395 0.33435 0.153)
      PhysicalOffsetFrame humerus_r_offset: socket_parent=/bodyset/humerus_r translation=(0 0 0)
      SpatialTransform: axes_held_at_zero=(translation1 translation2 translation3)
        TransformAxis rotation1: coordinates=arm_flex_r axis=(0 0 1) LinearFunction(coefficients=1 0)
        TransformAxis rotation2: coordinates=arm_add_r axis=(1 0 0) LinearFunction(coefficients=1 0)
        TransformAxis rotation3: coordinates=arm_rot_r axis=(0 1 0) LinearFunction(coefficients=1 0)
    PinJoint elbow_r: socket_parent_frame=humerus_r_offset socket_child_frame=ulna_r_offset
      Coordinate elbow_flex_r: default_value=0.5256975 range=(0 2.618) clamped=true
      PhysicalOffsetFrame humerus_r_offset: socket_parent=/bodyset/humerus_r
          translation=(0.0144584 -0.3149003 -0.0105545) orientation=(-0.0228627 0.228018 0.0051689)
      PhysicalOffsetFrame ulna_r_offset: socket_parent=/bodyset/ulna_r translation=(0 0 0)
          orientation=(-0.0228627 0.228018 0.0051689)
    PinJoint radioulnar_r: socket_parent_frame=ulna_r_offset socket_child_frame=radius_r_offset
      Coordinate pro_sup_r: default_value=1.570796 range=(0 1.570796) clamped=true locked=true
      PhysicalOffsetFrame ulna_r_offset: socket_parent=/bodyset/ulna_r
          translation=(-0.007069439 -0.01366912 0.02741076) orientation=(-1.56884 0.056428 1.53614)
      PhysicalOffsetFrame radius_r_offset: socket_parent=/bodyset/radius_r translation=(0 0 0)
          orientation=(-1.56884 0.056428 1.53614)
    UniversalJoint radius_hand_r: socket_parent_frame=radius_r_offset socket_child_frame=hand_r_offset
      Coordinate wrist_flex_r: default_value=0 range=(-1.22173 1.22173) clamped=true locked=true
      Coordinate wrist_dev_r: default_value=0 range=(-0.4363323 0.6108652) clamped=true locked=true
      PhysicalOffsetFrame radius_r_offset: socket_parent=/bodyset/radius_r
          translation=(-0.009244813 -0.2478465 0.01430282) orientation=(-1.5708 0 -1.5708)
      PhysicalOffsetFrame hand_r_offset: socket_parent=/bodyset/hand_r translation=(0 0 0)
          orientation=(-1.5708 0 -1.5708)
    CustomJoint acromial_l: socket_parent_frame=torso_offset socket_child_frame=humerus_l_offset
      Coordinate arm_flex_l: default_value=-0.09613714 range=(-1.570796 1.570796) clamped=true
      Coordinate arm_add_l: default_value=-0.3496708 range=(-2.094395 1.570796) clamped=true
      Coordinate arm_rot_l: default_value=-0.1264701 range=(-1.570796 1.570796) clamped=true
      PhysicalOffsetFrame torso_offset: socket_parent=/bodyset/torso translation=(0.0028395 0.33435 -0.153)
      PhysicalOffsetFrame humerus_l_offset: socket_parent=/bodyset/humerus_l translation=(0 0 0)
      SpatialTransform: axes_held_at_zero=(translation1 translation2 translation3)
        TransformAxis rotation1: coordinates=arm_flex_l axis=(0 0 1) LinearFunction(coefficients=1 0)
        TransformAxis rotation2: coordinates=arm_add_l axis=(-1 0 0) LinearFunction(coefficients=1 0)
        TransformAxis rotation3: coordinates=arm_rot_l axis=(0 -1 0) LinearFunction(coefficients=1 0)
    PinJoint elbow_l: socket_parent_frame=humerus_l_offset socket_child_frame=ulna_l_offset
      Coordinate elbow_flex_l: default_value=0.5855638 range=(0 2.618) clamped=true
      PhysicalOffsetFrame humerus_l_offset: socket_parent=/bodyset/humerus_l
          translation=(0.0144584 -0.3149003 0.0105545) orientation=(0.0228627 -0.228018 0.0051689)
      PhysicalOffsetFrame ulna_l_offset: socket_parent=/bodyset/ulna_l translation=(0 0 0)
          orientation=(0.0228627 -0.228018 0.0051689)
    PinJoint radioulnar_l: socket_parent_frame=ulna_l_offset socket_child_frame=radius_l_offset
      Coordinate pro_sup_l: default_value=1.570796 range=(0 1.570796) clamped=true locked=true
      PhysicalOffsetFrame ulna_l_offset: socket_parent=/bodyset/ulna_l
          translation=(-0.007069439 -0.01366912 -0.02741076) orientation=(1.56884 -0.056428 1.53614)
      PhysicalOffsetFrame radius_l_offset: socket_parent=/bodyset/radius_l translation=(0 0 0)
          orientation=(1.56884 -0.056428 1.53614)
    UniversalJoint radius_hand_l: socket_parent_frame=radius_l_offset socket_child_frame=hand_l_offset
      Coordinate wrist_flex_l: default_value=0 range=(-1.22173 1.22173) clamped=true locked=true
      Coordinate wrist_dev_l: default_value=0 range=(-0.4363323 0.6108652) clamped=true locked=true
      PhysicalOffsetFrame radius_l_offset: socket_parent=/bodyset/radius_l
          translation=(-0.009244813 -0.2478465 -0.01430282) orientation=(1.5708 0 1.5708)
      PhysicalOffsetFrame hand_l_offset: socket_parent=/bodyset/hand_l translation=(0 0 0)
          orientation=(1.5708 0 1.5708)
  ConstraintSet:
    CoordinateCouplerConstraint patellofemoral_knee_angle_r_con: independent_coordinate_names=knee_angle_r
        dependent_coordinate_name=knee_angle_r_beta scale_factor=1
        coupled_coordinates_function=LinearFunction(coefficients=1 0)
    CoordinateCouplerConstraint patellofemoral_knee_angle_l_con: independent_coordinate_names=knee_angle_l
        dependent_coordinate_name=knee_angle_l_beta scale_factor=1
        coupled_coordinates_function=LinearFunction(coefficients=1 0)
  ForceSet:
    Millard2012EquilibriumMuscle [values shared by the 86 below unless stated]: appliesForce=false fiber_damping=0.1
        default_activation=0.01 minimum_activation=0.01
      ActiveForceLengthCurve: min_norm_active_fiber_length=0.25 transition_norm_fiber_length=0.77
          max_norm_active_fiber_length=1.9 shallow_ascending_slope=0.75 minimum_value=0
      ForceVelocityCurve: concentric_slope_at_vmax=0 concentric_slope_near_vmax=0.25 isometric_slope=5
          eccentric_slope_at_vmax=0 eccentric_slope_near_vmax=0.15 max_eccentric_velocity_force_multiplier=1.4
      FiberForceLengthCurve: strain_at_zero_force=0 strain_at_one_norm_force=0.7
      TendonForceLengthCurve
    Millard2012EquilibriumMuscle addbrev_r: max_isometric_force=625.8197 optimal_fiber_length=0.1088739
        tendon_slack_length=0.0374356 pennation_angle_at_optimal=0.1147809 [radians] ignore_tendon_compliance=true
      PathPoint P1: pelvis (-0.02094411 -0.1030757 0.01688687)
      PathPoint P2: femur_r (-0.002081647 -0.1228172 0.02591651)
      PathWrap: wrap_object=AB_at_femshaft_r method=hybrid
    Millard2012EquilibriumMuscle addlong_r: max_isometric_force=916.8 optimal_fiber_length=0.1130251
        tendon_slack_length=0.1376769 pennation_angle_at_optimal=0.1317994
      PathPoint P1: pelvis (-0.008311851 -0.09748331 0.02070287)
      PathPoint P2: femur_r (0.01171968 -0.249142 0.01647624)
      PathWrap: wrap_object=AL_at_femshaft_r method=hybrid
    Millard2012EquilibriumMuscle addmagDist_r: max_isometric_force=597.2951 optimal_fiber_length=0.182867
        tendon_slack_length=0.0901752 pennation_angle_at_optimal=0.194705 ignore_tendon_compliance=true
      PathPoint P1: pelvis (-0.08118858 -0.1399966 0.04366463)
      PathPoint P2: femur_r (0.01170927 -0.2732162 0.0200879)
      PathWrap: wrap_object=AMdist_at_femshaft_r method=hybrid
    Millard2012EquilibriumMuscle addmagIsch_r: max_isometric_force=597.2951 optimal_fiber_length=0.1613686
        tendon_slack_length=0.2235017 pennation_angle_at_optimal=0.1680443
      PathPoint P1: pelvis (-0.09827283 -0.1422884 0.04573711)
      PathPoint P2: femur_r (0.005006362 -0.4038084 -0.03406616)
      PathWrap: wrap_object=AMisch_at_condyles_r method=hybrid
    Millard2012EquilibriumMuscle addmagMid_r: max_isometric_force=597.2951 optimal_fiber_length=0.1428768
        tendon_slack_length=0.04838067 pennation_angle_at_optimal=0.2073076 ignore_tendon_compliance=true
      PathPoint P1: pelvis (-0.05774433 -0.1324084 0.03129554)
      PathPoint P2: femur_r (0.002518793 -0.1690298 0.03041287)
      PathWrap: wrap_object=AMmid_at_femshaft_r method=hybrid
    Millard2012EquilibriumMuscle addmagProx_r: max_isometric_force=597.2951 optimal_fiber_length=0.1124057
        tendon_slack_length=0.0429229 pennation_angle_at_optimal=0.3114833 ignore_tendon_compliance=true
      PathPoint P1: pelvis (-0.03397113 -0.117934 0.01496791)
      PathPoint P2: femur_r (-0.01589338 -0.08207936 0.03332718)
      PathWrap: wrap_object=AMprox_at_femshaft_r method=hybrid
    Millard2012EquilibriumMuscle bflh_r: max_isometric_force=1313.184 optimal_fiber_length=0.1017324
        tendon_slack_length=0.346578 pennation_angle_at_optimal=0.1759182
      PathPoint P1: pelvis (-0.1140412 -0.1305991 0.06425784)
      PathPoint P2: tibia_r (-0.03551329 -0.03770445 0.03739438)
      PathPoint P3: tibia_r (-0.0279476 -0.05176094 0.03592672)
    Millard2012EquilibriumMuscle bfsh_r: max_isometric_force=557.1148 optimal_fiber_length=0.1166581
        tendon_slack_length=0.1119176 pennation_angle_at_optimal=0.2642232 ignore_tendon_compliance=true
      PathPoint P1: femur_r (0.005204119 -0.2197179 0.02435528)
      PathPoint P2: tibia_r (-0.02962197 -0.03394228 0.03311542)
      PathWrap: wrap_object=BF_at_gastroc_r method=hybrid
    Millard2012EquilibriumMuscle edl_r: max_isometric_force=603.4982 optimal_fiber_length=0.0712679
        tendon_slack_length=0.3793501 pennation_angle_at_optimal=0.2182582
      PathPoint P1: tibia_r (-0.01653704 -0.1195835 0.02118808)
      PathPoint P2: tibia_r (0.01695047 -0.3886205 0.01157593)
      PathPoint P3: calcn_r (0.09372199 0.03671373 0.0008158606)
      PathPoint P4: calcn_r (0.1648038 0.005609042 0.01325774)
      PathPoint P5: toes_r (0.0003059477 0.004793181 0.01560333)
      PathPoint P6: toes_r (0.04517828 -0.0004079303 0.02549564)
    Millard2012EquilibriumMuscle ehl_r: max_isometric_force=285.8675 optimal_fiber_length=0.07682857
        tendon_slack_length=0.3356579 pennation_angle_at_optimal=0.1972681
      PathPoint P1: tibia_r (-0.01446991 -0.1602026 0.01953438)
      PathPoint P2: tibia_r (0.007338312 -0.3006641 0.01695047)
      PathPoint P3: tibia_r (0.0206713 -0.3816956 -0.002893982)
      PathPoint P4: calcn_r (0.0989231 0.03967122 -0.02151832)
      PathPoint P5: calcn_r (0.1318635 0.03151262 -0.02620952)
      PathPoint P6: calcn_r (0.1768378 0.01417558 -0.02855512)
      PathPoint P7: toes_r (0.03039081 0.004181286 -0.02498573)
      PathPoint P8: toes_r (0.05741619 0.003467408 -0.01896876)
    Millard2012EquilibriumMuscle fdl_r: max_isometric_force=423.177 optimal_fiber_length=0.04577505
        tendon_slack_length=0.3887522 pennation_angle_at_optimal=0.2248391
      PathPoint P1: tibia_r (-0.0023772 -0.1893491 -0.001860417)
      PathPoint P2: tibia_r (-0.01819074 -0.3767345 -0.01281621)
      PathPoint P3: calcn_r (0.0444644 0.03212451 -0.02855512)
      PathPoint P4: calcn_r (0.07220367 0.01794893 -0.02682142)
      PathPoint P5: calcn_r (0.1690871 -0.008260589 0.01182998)
      PathPoint P6: toes_r (-0.001937669 -0.007954641 0.01499144)
      PathPoint P7: toes_r (0.02906503 -0.007240763 0.02192625)
      PathPoint P8: toes_r (0.04497432 -0.006118955 0.02467978)
    Millard2012EquilibriumMuscle fhl_r: max_isometric_force=907.8393 optimal_fiber_length=0.05406099
        tendon_slack_length=0.3634906 pennation_angle_at_optimal=0.2580255
      PathPoint P1: tibia_r (-0.03204052 -0.2235601 0.0206713)
      PathPoint P2: tibia_r (-0.02501227 -0.3794217 -0.007855094)
      PathPoint P3: calcn_r (0.03814148 0.02814719 -0.0245778)
      PathPoint P4: calcn_r (0.1058579 0.006934815 -0.02610754)
      PathPoint P5: calcn_r (0.1760219 -0.005405077 -0.02743331)
      PathPoint P6: toes_r (0.0158073 -0.006526885 -0.02702538)
      PathPoint P7: toes_r (0.05731421 -0.01040222 -0.01845885)
    Millard2012EquilibriumMuscle gaslat_r: max_isometric_force=1575.059 optimal_fiber_length=0.07204468
        tendon_slack_length=0.390503 pennation_angle_at_optimal=0.2102268
      PathPoint P1: femur_r (0.002081647 -0.3965538 0.02143056)
      PathPoint P2: calcn_r (0.004487233 0.0316146 -0.005405077)
      PathWrap shank: wrap_object=GasLat_at_shank_r method=hybrid
      PathWrap condyles: wrap_object=GasLat_at_condyles_r method=hybrid
    Millard2012EquilibriumMuscle gasmed_r: max_isometric_force=3115.515 optimal_fiber_length=0.06038072
        tendon_slack_length=0.3960566 pennation_angle_at_optimal=0.1656816
      PathPoint P1: femur_r (0.006244942 -0.4007171 -0.02289812)
      PathPoint P2: calcn_r (0.004487233 0.0316146 -0.005405077)
      PathWrap shank: wrap_object=GasMed_at_shank_r method=hybrid
      PathWrap condyles: wrap_object=GasMed_at_condyles_r method=hybrid
    Millard2012EquilibriumMuscle gem_r: max_isometric_force=170.4 optimal_fiber_length=0.02583373
        tendon_slack_length=0.04197982 pennation_angle_at_optimal=0 ignore_tendon_compliance=true
      PathPoint P1: pelvis (-0.1242391 -0.08991712 0.07829368)
      PathPoint P2: femur_r (-0.0147797 -0.003434718 0.04610849)
    Millard2012EquilibriumMuscle glmax1_r: max_isometric_force=983.7836 optimal_fiber_length=0.1586112
        tendon_slack_length=0.09419564 pennation_angle_at_optimal=0.3540118 ignore_tendon_compliance=true
      PathPoint P1: pelvis (-0.1349853 0.03783098 0.06173578)
      PathPoint P2: pelvis (-0.1378364 -0.02653651 0.08542126)
      PathPoint P3: femur_r (-0.04621257 -0.03393085 0.03143288)
      PathPoint P4: femur_r (-0.02883082 -0.05891062 0.04891872)
      PathWrap: wrap_object=Gmax1_at_pelvis_r method=hybrid
    Millard2012EquilibriumMuscle glmax2_r: max_isometric_force=1406.046 optimal_fiber_length=0.168385
        tendon_slack_length=0.1169043 pennation_angle_at_optimal=0.3673821 ignore_tendon_compliance=true
      PathPoint P1: pelvis (-0.1444157 0.009539987 0.05066062)
      PathPoint P2: pelvis (-0.1473763 -0.06677991 0.08914953)
      PathPoint P3: femur_r (-0.04683707 -0.06078411 0.02622876)
      PathPoint P4: femur_r (-0.01623685 -0.1057477 0.04361052)
      PathWrap: wrap_object=Gmax2_at_pelvis_r method=hybrid
    Millard2012EquilibriumMuscle glmax3_r: max_isometric_force=947.7541 optimal_fiber_length=0.1780635
        tendon_slack_length=0.1098236 pennation_angle_at_optimal=0.3824161 ignore_tendon_compliance=true
      PathPoint P1: pelvis (-0.1425515 -0.05756889 0.009868952)
      PathPoint P2: pelvis (-0.1395908 -0.1384943 0.04769993)
      PathPoint P3: femur_r (-0.02924715 -0.1170927 0.009783743)
      PathPoint P4: femur_r (-0.006244942 -0.1476929 0.04277786)
      PathWrap: wrap_object=Gmax3_at_pelvis_r method=hybrid
    Millard2012EquilibriumMuscle glmed1_r: max_isometric_force=1093.467 optimal_fiber_length=0.08290076
        tendon_slack_length=0.0633947 pennation_angle_at_optimal=0.3165559 ignore_tendon_compliance=true
      PathPoint P1: pelvis (-0.05373096 0.02851031 0.1261033)
      PathPoint P2: femur_r (-0.01457153 -0.01873483 0.0614086)
    Millard2012EquilibriumMuscle glmed2_r: max_isometric_force=765.0917 optimal_fiber_length=0.09128896
        tendon_slack_length=0.08199705 pennation_angle_at_optimal=0.3165559 ignore_tendon_compliance=true
      PathPoint P1: pelvis (-0.09320677 0.06031026 0.08991712)
      PathPoint P2: femur_r (-0.02289812 -0.01040824 0.05828613)
    Millard2012EquilibriumMuscle glmed3_r: max_isometric_force=871.1993 optimal_fiber_length=0.08461112
        tendon_slack_length=0.05243506 pennation_angle_at_optimal=0.3165559 ignore_tendon_compliance=true
      PathPoint P1: pelvis (-0.109655 0.0175448 0.07017921)
      PathPoint P2: femur_r (-0.03216145 -0.004891872 0.05391467)
    Millard2012EquilibriumMuscle glmin1_r: max_isometric_force=374.0459 optimal_fiber_length=0.08815165
        tendon_slack_length=0.02092653 pennation_angle_at_optimal=0.1745329 ignore_tendon_compliance=true
      PathPoint P1: pelvis (-0.03289651 0 0.1293929)
      PathPoint P2: femur_r (0.005204119 -0.01561236 0.05828613)
    Millard2012EquilibriumMuscle glmin2_r: max_isometric_force=394.8197 optimal_fiber_length=0.07447582
        tendon_slack_length=0.03471202 pennation_angle_at_optimal=0 ignore_tendon_compliance=true
      PathPoint P1: pelvis (-0.06754749 0.0109655 0.1107516)
      PathPoint P2: femur_r (0.004163295 -0.009367414 0.05412283)
    Millard2012EquilibriumMuscle glmin3_r: max_isometric_force=446.7738 optimal_fiber_length=0.03799896
        tendon_slack_length=0.05080881 pennation_angle_at_optimal=0.01745329
      PathPoint P1: pelvis (-0.08651781 -0.01699653 0.08750471)
      PathPoint P2: femur_r (-0.004163295 -0.001040824 0.05360242)
    Millard2012EquilibriumMuscle grac_r: max_isometric_force=281.3115 optimal_fiber_length=0.2331333
        tendon_slack_length=0.1760416 pennation_angle_at_optimal=0.1720016 ignore_tendon_compliance=true
      PathPoint P1: pelvis (-0.05193262 -0.1418059 0.02693127)
      PathPoint P2: tibia_r (-0.01903827 -0.04914602 -0.03060386)
      PathPoint P3: tibia_r (0.001839746 -0.0719568 -0.01625798)
      PathWrap: wrap_object=GR_at_condyles_r method=hybrid
    Millard2012EquilibriumMuscle iliacus_r: max_isometric_force=1021.141 optimal_fiber_length=0.1152206
        tendon_slack_length=0.1038939 pennation_angle_at_optimal=0.279914 ignore_tendon_compliance=true
      PathPoint P1: pelvis (-0.06634129 0.0338834 0.09243918)
      PathPoint P2: pelvis (-0.01480343 -0.06107785 0.0828992)
      PathPoint P3: femur_r (-0.002393895 -0.05880654 0.01446745)
      PathPoint P4: femur_r (-0.01269805 -0.06630047 0.02040015)
      PathWrap: wrap_object=IL_at_brim_r method=hybrid range=(2 3)
    Millard2012EquilibriumMuscle pect_r: max_isometric_force=319.6 optimal_fiber_length=0.1055765
        tendon_slack_length=0.03484025 pennation_angle_at_optimal=0 ignore_tendon_compliance=true
      PathPoint P1: pelvis (-0.02561541 -0.09112332 0.04920221)
      PathPoint P2: femur_r (-0.01332254 -0.08521224 0.02652019)
      PathWrap: wrap_object=PECT_at_femshaft_r method=hybrid
    Millard2012EquilibriumMuscle perbrev_r: max_isometric_force=521.2016 optimal_fiber_length=0.04682071
        tendon_slack_length=0.1521441 pennation_angle_at_optimal=0.2052361
      PathPoint P1: tibia_r (-0.02511563 -0.2616987 0.02594248)
      PathPoint P2: tibia_r (-0.03503785 -0.4023669 0.02573577)
      PathPoint P3: tibia_r (-0.0294566 -0.4138394 0.02635591)
      PathPoint P4: calcn_r (0.04803379 0.0275353 0.02376194)
      PathPoint P5: calcn_r (0.06904221 0.02233418 0.03498002)
    Millard2012EquilibriumMuscle perlong_r: max_isometric_force=1115.371 optimal_fiber_length=0.05231254
        tendon_slack_length=0.3421124 pennation_angle_at_optimal=0.2479525
      PathPoint P1: tibia_r (-0.0206713 -0.1419085 0.02914653)
      PathPoint P2: tibia_r (-0.03276401 -0.4030904 0.02449549)
      PathPoint P3: tibia_r (-0.02811297 -0.414873 0.02480556)
      PathPoint P4: calcn_r (0.04466837 0.02345599 0.02253815)
      PathPoint P5: calcn_r (0.06945014 0.01081015 0.02896305)
      PathPoint P6: calcn_r (0.08688916 0.007036798 0.01203394)
      PathPoint P7: calcn_r (0.122685 0.008668519 -0.01876479)
    Millard2012EquilibriumMuscle piri_r: max_isometric_force=1029.787 optimal_fiber_length=0.02822415
        tendon_slack_length=0.1247358 pennation_angle_at_optimal=0.1745329
      PathPoint P1: pelvis (-0.1116398 -0.007160473 0.01481439)
      PathPoint P2: pelvis (-0.1118701 -0.03362023 0.06680184)
      PathPoint P3: femur_r (-0.01540419 -0.003746965 0.045484)
    Millard2012EquilibriumMuscle psoas_r: max_isometric_force=1426.79 optimal_fiber_length=0.1266402
        tendon_slack_length=0.1078372 pennation_angle_at_optimal=0.2155251 ignore_tendon_compliance=true
      PathPoint P1: pelvis (-0.06645094 0.06798611 0.04276546)
      PathPoint P2: pelvis (-0.02247928 -0.07171438 0.07193369)
      PathPoint P3: femur_r (-0.01373887 -0.04860647 0.004787789)
      PathPoint P4: femur_r (-0.02445936 -0.05453916 0.009159249)
      PathWrap: wrap_object=PS_at_brim_r method=hybrid range=(2 3)
    Millard2012EquilibriumMuscle quadfem_r: max_isometric_force=397 optimal_fiber_length=0.05822535
        tendon_slack_length=0.02587793 pennation_angle_at_optimal=0 ignore_tendon_compliance=true
      PathPoint P1: pelvis (-0.1253357 -0.1262129 0.05702061)
      PathPoint P2: femur_r (-0.03965538 -0.03736557 0.03809415)
    Millard2012EquilibriumMuscle recfem_r: max_isometric_force=2191.741 optimal_fiber_length=0.07913541
        tendon_slack_length=0.4695993 pennation_angle_at_optimal=0.2170149
      PathPoint P1: pelvis (-0.0263172 -0.04254615 0.1023081)
      PathPoint P2: patella_r (0.01040824 0.05100036 0.0007285766)
      PathPoint P3: patella_r (0.01259397 0.045484 -0.001040824)
      PathPoint P4: patella_r (0.005204119 0.002570835 3.122471e-5)
      PathPoint P5: tibia_r (0.03369422 -0.06523862 -0.0004857756)
      PathWrap: wrap_object=KnExt_at_fem_r method=hybrid
    Millard2012EquilibriumMuscle sart_r: max_isometric_force=249.4131 optimal_fiber_length=0.4180903
        tendon_slack_length=0.1286432 pennation_angle_at_optimal=0.02613542 ignore_tendon_compliance=true
      PathPoint P1: pelvis (-0.02138273 -0.01710618 0.1157957)
      PathPoint P2: femur_r (-0.003122471 -0.3713659 -0.04381868)
      PathPoint P3: tibia_r (-0.02594248 -0.04144596 -0.03772512)
      PathPoint P4: tibia_r (-0.01643368 -0.06191055 -0.02728612)
      PathPoint P5: tibia_r (0.01405648 -0.08371877 -0.002687269)
    Millard2012EquilibriumMuscle semimem_r: max_isometric_force=2200.987 optimal_fiber_length=0.08869583
        tendon_slack_length=0.3455012 pennation_angle_at_optimal=0.2545615
      PathPoint P1: pelvis (-0.1082295 -0.1250067 0.06732818)
      PathPoint P2: tibia_r (-0.02790626 -0.04237617 -0.02025787)
      PathWrap: wrap_object=SM_at_condyles_r method=hybrid
    Millard2012EquilibriumMuscle semiten_r: max_isometric_force=591.2951 optimal_fiber_length=0.1985771
        tendon_slack_length=0.2543437 pennation_angle_at_optimal=0.241295
      PathPoint P1: pelvis (-0.1138219 -0.1373977 0.05647234)
      PathPoint P2: tibia_r (-0.03224723 -0.0525051 -0.02366864)
      PathPoint P3: tibia_r (0.001963774 -0.07989458 -0.01209271)
      PathWrap: wrap_object=ST_at_condyles_r method=hybrid
    Millard2012EquilibriumMuscle soleus_r: max_isometric_force=6194.843 optimal_fiber_length=0.04546573
        tendon_slack_length=0.2907224 pennation_angle_at_optimal=0.3814289
      PathPoint P1: tibia_r (-0.007855094 -0.09467456 0.01012894)
      PathPoint P2: calcn_r (0.004487233 0.0316146 -0.005405077)
    Millard2012EquilibriumMuscle tfl_r: max_isometric_force=411.2066 optimal_fiber_length=0.09834545
        tendon_slack_length=0.4653329 pennation_angle_at_optimal=0.05235988
      PathPoint P1: pelvis (-0.021931 0.01206205 0.141455)
      PathPoint P2: femur_r (0.03060022 -0.103562 0.06213718)
      PathPoint P3: femur_r (0.01113681 -0.4215336 0.03372269)
      PathPoint P4: tibia_r (0.0111625 -0.04237617 0.03576135)
    Millard2012EquilibriumMuscle tibant_r: max_isometric_force=1227.452 optimal_fiber_length=0.07035347
        tendon_slack_length=0.2476906 pennation_angle_at_optimal=0.1951828
      PathPoint P1: tibia_r (0.0159169 -0.1356037 0.01674375)
      PathPoint P2: tibia_r (0.02594248 -0.1969975 0.01322963)
      PathPoint P3: tibia_r (0.02408207 -0.3781814 -0.01364306)
      PathPoint P4: calcn_r (0.1189117 0.0181529 -0.03110469)
    Millard2012EquilibriumMuscle tibpost_r: max_isometric_force=1730.154 optimal_fiber_length=0.03896168
        tendon_slack_length=0.2894086 pennation_angle_at_optimal=0.2264891
      PathPoint P1: tibia_r (-0.004237617 -0.1347769 0.01064572)
      PathPoint P2: tibia_r (-0.01695047 -0.377768 -0.01808739)
      PathPoint P3: calcn_r (0.04252674 0.03406218 -0.02916702)
      PathPoint P4: calcn_r (0.07873055 0.01621523 -0.0286571)
    Millard2012EquilibriumMuscle vasint_r: max_isometric_force=1697.361 optimal_fiber_length=0.1213172
        tendon_slack_length=0.2125644 pennation_angle_at_optimal=0.06309973
      PathPoint P1: femur_r (0.03018389 -0.2002545 0.03226554)
      PathPoint P2: femur_r (0.0348676 -0.2169077 0.02966348)
      PathPoint P3: patella_r (0.006036778 0.04995954 -0.0006244942)
      PathPoint P4: patella_r (0.005204119 0.002570835 -0.0004059213)
      PathPoint P5: tibia_r (0.03366321 -0.06532131 0.000444433)
      PathWrap: wrap_object=KnExt_at_fem_r method=hybrid
    Millard2012EquilibriumMuscle vaslat_r: max_isometric_force=5148.767 optimal_fiber_length=0.121614
        tendon_slack_length=0.2297154 pennation_angle_at_optimal=0.2528673
      PathPoint P1: femur_r (0.004995954 -0.1929687 0.03632475)
      PathPoint P2: femur_r (0.02799816 -0.2696774 0.04256969)
      PathPoint P3: patella_r (0.01072048 0.04402684 0.01467561)
      PathPoint P4: patella_r (0.005204119 0.002570835 0.007629238)
      PathPoint P5: tibia_r (0.03363221 -0.06550735 0.005281517)
      PathWrap: wrap_object=KnExtVL_at_fem_r method=hybrid
    Millard2012EquilibriumMuscle vasmed_r: max_isometric_force=2747.823 optimal_fiber_length=0.1136179
        tendon_slack_length=0.2148411 pennation_angle_at_optimal=0.4222225
      PathPoint P1: femur_r (0.01457153 -0.2184689 0.01956749)
      PathPoint P2: femur_r (0.03705333 -0.2882041 0.0009367414)
      PathPoint P3: patella_r (0.00655719 0.04631666 -0.017694)
      PathPoint P4: patella_r (0.005204119 0.002570835 -0.008847002)
      PathPoint P5: tibia_r (0.03297072 -0.06570373 -0.007007571)
      PathWrap: wrap_object=KnExt_at_fem_r method=hybrid
    Millard2012EquilibriumMuscle addbrev_l: max_isometric_force=625.8197 optimal_fiber_length=0.1097606
        tendon_slack_length=0.03774051 pennation_angle_at_optimal=0.1147809 ignore_tendon_compliance=true
      PathPoint P1: pelvis (-0.02094411 -0.1030757 -0.01688687)
      PathPoint P2: femur_l (-0.002105433 -0.1242206 -0.02621264)
      PathWrap: wrap_object=AB_at_femshaft_l method=hybrid
    Millard2012EquilibriumMuscle addlong_l: max_isometric_force=916.8 optimal_fiber_length=0.1142222
        tendon_slack_length=0.139135 pennation_angle_at_optimal=0.1377704
      PathPoint P1: pelvis (-0.008311851 -0.09748331 -0.02070287)
      PathPoint P2: femur_l (0.01185359 -0.2519888 -0.0166645)
      PathWrap: wrap_object=AL_at_femshaft_l method=hybrid
    Millard2012EquilibriumMuscle addmagDist_l: max_isometric_force=597.2951 optimal_fiber_length=0.1853059
        tendon_slack_length=0.09137788 pennation_angle_at_optimal=0.194705 ignore_tendon_compliance=true
      PathPoint P1: pelvis (-0.08118858 -0.1399966 -0.04366463)
      PathPoint P2: femur_l (0.01184306 -0.2763381 -0.02031743)
      PathWrap: wrap_object=AMdist_at_femshaft_l method=hybrid
    Millard2012EquilibriumMuscle addmagIsch_l: max_isometric_force=597.2951 optimal_fiber_length=0.163483
        tendon_slack_length=0.2264303 pennation_angle_at_optimal=0.1680443
      PathPoint P1: pelvis (-0.09827283 -0.1422884 -0.04573711)
      PathPoint P2: femur_l (0.005063567 -0.4084224 0.03445541)
      PathWrap: wrap_object=AMisch_at_condyles_l method=hybrid
    Millard2012EquilibriumMuscle addmagMid_l: max_isometric_force=597.2951 optimal_fiber_length=0.1446021
        tendon_slack_length=0.04896488 pennation_angle_at_optimal=0.2073076 ignore_tendon_compliance=true
      PathPoint P1: pelvis (-0.05774433 -0.1324084 -0.03129554)
      PathPoint P2: femur_l (0.002547574 -0.1709612 -0.03076038)
      PathWrap: wrap_object=AMmid_at_femshaft_l method=hybrid
    Millard2012EquilibriumMuscle addmagProx_l: max_isometric_force=597.2951 optimal_fiber_length=0.1131229
        tendon_slack_length=0.04319676 pennation_angle_at_optimal=0.3114833 ignore_tendon_compliance=true
      PathPoint P1: pelvis (-0.03397113 -0.117934 -0.01496791)
      PathPoint P2: femur_l (-0.01607498 -0.08301723 -0.03370798)
      PathWrap: wrap_object=AMprox_at_femshaft_l method=hybrid
    Millard2012EquilibriumMuscle bflh_l: max_isometric_force=1313.184 optimal_fiber_length=0.1026864
        tendon_slack_length=0.3498282 pennation_angle_at_optimal=0.1759182
      PathPoint P1: pelvis (-0.1140412 -0.1305991 -0.06425784)
      PathPoint P2: tibia_l (-0.03505104 -0.03721367 -0.03690764)
      PathPoint P3: tibia_l (-0.02758994 -0.05108719 -0.03545908)
    Millard2012EquilibriumMuscle bfsh_l: max_isometric_force=557.1148 optimal_fiber_length=0.1174704
        tendon_slack_length=0.1126967 pennation_angle_at_optimal=0.2642232 ignore_tendon_compliance=true
      PathPoint P1: femur_l (0.005263583 -0.2222285 -0.02463357)
      PathPoint P2: tibia_l (-0.0292364 -0.03350047 -0.03268438)
      PathWrap: wrap_object=BF_at_gastroc_l method=hybrid
    Millard2012EquilibriumMuscle edl_l: max_isometric_force=603.4982 optimal_fiber_length=0.07069575
        tendon_slack_length=0.3763046 pennation_angle_at_optimal=0.2182582
      PathPoint P1: tibia_l (-0.01632179 -0.1180269 -0.02091229)
      PathPoint P2: tibia_l (0.01672983 -0.383562 -0.01142525)
      PathPoint P3: calcn_l (0.09372199 0.03671373 -0.0008158606)
      PathPoint P4: calcn_l (0.1648038 0.005609042 -0.01325774)
      PathPoint P5: toes_l (0.0003059477 0.004793181 -0.01560333)
      PathPoint P6: toes_l (0.04517828 -0.0004079303 -0.02549564)
    Millard2012EquilibriumMuscle ehl_l: max_isometric_force=285.8675 optimal_fiber_length=0.07614007
        tendon_slack_length=0.33265 pennation_angle_at_optimal=0.1972681
      PathPoint P1: tibia_l (-0.01428156 -0.1581173 -0.01928011)
      PathPoint P2: tibia_l (0.007242793 -0.2967505 -0.01672983)
      PathPoint P3: tibia_l (0.02040223 -0.3767272 0.002856313)
      PathPoint P4: calcn_l (0.0989231 0.03967122 0.02151832)
      PathPoint P5: calcn_l (0.1318635 0.03151262 0.02620952)
      PathPoint P6: calcn_l (0.1768378 0.01417558 0.02855512)
      PathPoint P7: toes_l (0.03039081 0.004181286 0.02498573)
      PathPoint P8: toes_l (0.05741619 0.003467408 0.01896876)
    Millard2012EquilibriumMuscle fdl_l: max_isometric_force=423.177 optimal_fiber_length=0.04541844
        tendon_slack_length=0.3857236 pennation_angle_at_optimal=0.2248391
      PathPoint P1: tibia_l (-0.002346257 -0.1868845 0.001836201)
      PathPoint P2: tibia_l (-0.01795397 -0.3718307 0.01264938)
      PathPoint P3: calcn_l (0.0444644 0.03212451 0.02855512)
      PathPoint P4: calcn_l (0.07220367 0.01794893 0.02682142)
      PathPoint P5: calcn_l (0.1690871 -0.008260589 -0.01182998)
      PathPoint P6: toes_l (-0.001937669 -0.007954641 -0.01499144)
      PathPoint P7: toes_l (0.02906503 -0.007240763 -0.02192625)
      PathPoint P8: toes_l (0.04497432 -0.006118955 -0.02467978)
    Millard2012EquilibriumMuscle fhl_l: max_isometric_force=907.8393 optimal_fiber_length=0.05370346
        tendon_slack_length=0.3610867 pennation_angle_at_optimal=0.2580255
      PathPoint P1: tibia_l (-0.03162346 -0.2206502 -0.02040223)
      PathPoint P2: tibia_l (-0.0246867 -0.374483 0.007752849)
      PathPoint P3: calcn_l (0.03814148 0.02814719 0.0245778)
      PathPoint P4: calcn_l (0.1058579 0.006934815 0.02610754)
      PathPoint P5: calcn_l (0.1760219 -0.005405077 0.02743331)
      PathPoint P6: toes_l (0.0158073 -0.006526885 0.02702538)
      PathPoint P7: toes_l (0.05731421 -0.01040222 0.01845885)
    Millard2012EquilibriumMuscle gaslat_l: max_isometric_force=1575.059 optimal_fiber_length=0.07122551
        tendon_slack_length=0.3860629 pennation_angle_at_optimal=0.2102268
      PathPoint P1: femur_l (0.002105433 -0.401085 -0.02167543)
      PathPoint P2: calcn_l (0.004487233 0.0316146 0.005405077)
      PathWrap shank: wrap_object=GasLat_at_shank_l method=hybrid
      PathWrap condyles: wrap_object=GasLat_at_condyles_l method=hybrid
    Millard2012EquilibriumMuscle gasmed_l: max_isometric_force=3115.515 optimal_fiber_length=0.05974776
        tendon_slack_length=0.3919048 pennation_angle_at_optimal=0.1656816
      PathPoint P1: femur_l (0.006316299 -0.4052959 0.02315976)
      PathPoint P2: calcn_l (0.004487233 0.0316146 0.005405077)
      PathWrap shank: wrap_object=GasMed_at_shank_l method=hybrid
      PathWrap condyles: wrap_object=GasMed_at_condyles_l method=hybrid
    Millard2012EquilibriumMuscle gem_l: max_isometric_force=170.4 optimal_fiber_length=0.02593478
        tendon_slack_length=0.04214401 pennation_angle_at_optimal=0 ignore_tendon_compliance=true
      PathPoint P1: pelvis (-0.1242391 -0.08991712 -0.07829368)
      PathPoint P2: femur_l (-0.01494857 -0.003473965 -0.04663534)
    Millard2012EquilibriumMuscle glmax1_l: max_isometric_force=983.7836 optimal_fiber_length=0.1591559
        tendon_slack_length=0.09451911 pennation_angle_at_optimal=0.3540118 ignore_tendon_compliance=true
      PathPoint P1: pelvis (-0.1349853 0.03783098 -0.06173578)
      PathPoint P2: pelvis (-0.1378364 -0.02653651 -0.08542126)
      PathPoint P3: femur_l (-0.04674061 -0.03431856 -0.03179204)
      PathPoint P4: femur_l (-0.02916025 -0.05958376 -0.04947768)
      PathWrap: wrap_object=Gmax1_at_pelvis_l method=hybrid
    Millard2012EquilibriumMuscle glmax2_l: max_isometric_force=1406.046 optimal_fiber_length=0.1691811
        tendon_slack_length=0.1174569 pennation_angle_at_optimal=0.3673821 ignore_tendon_compliance=true
      PathPoint P1: pelvis (-0.1444157 0.009539987 -0.05066062)
      PathPoint P2: pelvis (-0.1473763 -0.06677991 -0.08914953)
      PathPoint P3: femur_l (-0.04737224 -0.06147865 -0.02652846)
      PathPoint P4: femur_l (-0.01642238 -0.106956 -0.04410882)
      PathWrap: wrap_object=Gmax2_at_pelvis_l method=hybrid
    Millard2012EquilibriumMuscle glmax3_l: max_isometric_force=947.7541 optimal_fiber_length=0.1791254
        tendon_slack_length=0.1104785 pennation_angle_at_optimal=0.3824161 ignore_tendon_compliance=true
      PathPoint P1: pelvis (-0.1425515 -0.05756889 -0.009868952)
      PathPoint P2: pelvis (-0.1395908 -0.1384943 -0.04769993)
      PathPoint P3: femur_l (-0.02958133 -0.1184306 -0.009895535)
      PathPoint P4: femur_l (-0.006316299 -0.1493805 -0.04326665)
      PathWrap: wrap_object=Gmax3_at_pelvis_l method=hybrid
    Millard2012EquilibriumMuscle glmed1_l: max_isometric_force=1093.467 optimal_fiber_length=0.08310741
        tendon_slack_length=0.06355272 pennation_angle_at_optimal=0.3165559 ignore_tendon_compliance=true
      PathPoint P1: pelvis (-0.05373096 0.02851031 -0.1261033)
      PathPoint P2: femur_l (-0.01473803 -0.0189489 -0.06211028)
    Millard2012EquilibriumMuscle glmed2_l: max_isometric_force=765.0917 optimal_fiber_length=0.09146163
        tendon_slack_length=0.08215214 pennation_angle_at_optimal=0.3165559 ignore_tendon_compliance=true
      PathPoint P1: pelvis (-0.09320677 0.06031026 -0.08991712)
      PathPoint P2: femur_l (-0.02315976 -0.01052717 -0.05895213)
    Millard2012EquilibriumMuscle glmed3_l: max_isometric_force=871.1993 optimal_fiber_length=0.08482705
        tendon_slack_length=0.05256888 pennation_angle_at_optimal=0.3165559 ignore_tendon_compliance=true
      PathPoint P1: pelvis (-0.109655 0.0175448 -0.07017921)
      PathPoint P2: femur_l (-0.03252894 -0.004947768 -0.05453072)
    Millard2012EquilibriumMuscle glmin1_l: max_isometric_force=374.0459 optimal_fiber_length=0.08835855
        tendon_slack_length=0.02097565 pennation_angle_at_optimal=0.1745329 ignore_tendon_compliance=true
      PathPoint P1: pelvis (-0.03289651 0 -0.1293929)
      PathPoint P2: femur_l (0.005263583 -0.01579075 -0.05895213)
    Millard2012EquilibriumMuscle glmin2_l: max_isometric_force=394.8197 optimal_fiber_length=0.07465514
        tendon_slack_length=0.0347956 pennation_angle_at_optimal=0 ignore_tendon_compliance=true
      PathPoint P1: pelvis (-0.06754749 0.0109655 -0.1107516)
      PathPoint P2: femur_l (0.004210866 -0.009474449 -0.05474126)
    Millard2012EquilibriumMuscle glmin3_l: max_isometric_force=446.7738 optimal_fiber_length=0.03815538
        tendon_slack_length=0.05101796 pennation_angle_at_optimal=0.01745329
      PathPoint P1: pelvis (-0.08651781 -0.01699653 -0.08750471)
      PathPoint P2: femur_l (-0.004210866 -0.001052717 -0.05368854)
    Millard2012EquilibriumMuscle grac_l: max_isometric_force=281.3115 optimal_fiber_length=0.2351595
        tendon_slack_length=0.1775715 pennation_angle_at_optimal=0.1720016 ignore_tendon_compliance=true
      PathPoint P1: pelvis (-0.05193262 -0.1418059 -0.02693127)
      PathPoint P2: tibia_l (-0.01879046 -0.04850631 0.03020551)
      PathPoint P3: tibia_l (0.001815799 -0.07102018 0.01604636)
      PathWrap: wrap_object=GR_at_condyles_l method=hybrid
    Millard2012EquilibriumMuscle iliacus_l: max_isometric_force=1021.141 optimal_fiber_length=0.1155736
        tendon_slack_length=0.1042121 pennation_angle_at_optimal=0.279914 ignore_tendon_compliance=true
      PathPoint P1: pelvis (-0.06634129 0.0338834 -0.09243918)
      PathPoint P2: pelvis (-0.01480343 -0.06107785 -0.0828992)
      PathPoint P3: femur_l (-0.002421248 -0.05947848 -0.01463276)
      PathPoint P4: femur_l (-0.01284314 -0.06705804 -0.02063324)
      PathWrap: wrap_object=IL_at_brim_l method=hybrid range=(2 3)
    Millard2012EquilibriumMuscle pect_l: max_isometric_force=319.6 optimal_fiber_length=0.1064439
        tendon_slack_length=0.03512649 pennation_angle_at_optimal=0 ignore_tendon_compliance=true
      PathPoint P1: pelvis (-0.02561541 -0.09112332 -0.04920221)
      PathPoint P2: femur_l (-0.01347477 -0.0861859 -0.02682322)
      PathWrap: wrap_object=PECT_at_femshaft_l method=hybrid
    Millard2012EquilibriumMuscle perbrev_l: max_isometric_force=521.2016 optimal_fiber_length=0.04629754
        tendon_slack_length=0.1504441 pennation_angle_at_optimal=0.2052361
      PathPoint P1: tibia_l (-0.02478871 -0.2582923 -0.0256048)
      PathPoint P2: tibia_l (-0.03458179 -0.3971295 -0.02540078)
      PathPoint P3: tibia_l (-0.02907318 -0.4084527 -0.02601285)
      PathPoint P4: calcn_l (0.04803379 0.0275353 -0.02376194)
      PathPoint P5: calcn_l (0.06904221 0.02233418 -0.03498002)
    Millard2012EquilibriumMuscle perlong_l: max_isometric_force=1115.371 optimal_fiber_length=0.05186301
        tendon_slack_length=0.3391726 pennation_angle_at_optimal=0.2479525
      PathPoint P1: tibia_l (-0.02040223 -0.1400613 -0.02876715)
      PathPoint P2: tibia_l (-0.03233754 -0.3978436 -0.02417665)
      PathPoint P3: tibia_l (-0.02774704 -0.4094728 -0.02448268)
      PathPoint P4: calcn_l (0.04466837 0.02345599 -0.02253815)
      PathPoint P5: calcn_l (0.06945014 0.01081015 -0.02896305)
      PathPoint P6: calcn_l (0.08688916 0.007036798 -0.01203394)
      PathPoint P7: calcn_l (0.122685 0.008668519 0.01876479)
    Millard2012EquilibriumMuscle piri_l: max_isometric_force=1029.787 optimal_fiber_length=0.02828447
        tendon_slack_length=0.1250024 pennation_angle_at_optimal=0.1745329
      PathPoint P1: pelvis (-0.1116398 -0.007160473 -0.01481439)
      PathPoint P2: pelvis (-0.1118701 -0.03362023 -0.06680184)
      PathPoint P3: femur_l (-0.0155802 -0.00378978 -0.04600371)
    Millard2012EquilibriumMuscle psoas_l: max_isometric_force=1426.79 optimal_fiber_length=0.1269686
        tendon_slack_length=0.1081169 pennation_angle_at_optimal=0.2155251 ignore_tendon_compliance=true
      PathPoint P1: pelvis (-0.06645094 0.06798611 -0.04276546)
      PathPoint P2: pelvis (-0.02247928 -0.07171438 -0.07193369)
      PathPoint P3: femur_l (-0.01389586 -0.04916186 -0.004842496)
      PathPoint P4: femur_l (-0.02473884 -0.05516235 -0.009263905)
      PathWrap: wrap_object=PS_at_brim_l method=hybrid range=(2 3)
    Millard2012EquilibriumMuscle quadfem_l: max_isometric_force=397 optimal_fiber_length=0.05842512
        tendon_slack_length=0.02596672 pennation_angle_at_optimal=0 ignore_tendon_compliance=true
      PathPoint P1: pelvis (-0.1253357 -0.1262129 -0.05702061)
      PathPoint P2: femur_l (-0.0401085 -0.03779252 -0.03852943)
    Millard2012EquilibriumMuscle recfem_l: max_isometric_force=2191.741 optimal_fiber_length=0.0798189
        tendon_slack_length=0.4736552 pennation_angle_at_optimal=0.2170149
      PathPoint P1: pelvis (-0.0263172 -0.04254615 -0.1023081)
      PathPoint P2: patella_l (0.01052717 0.05158311 -0.0007369016)
      PathPoint P3: patella_l (0.01273787 0.04600371 0.001052717)
      PathPoint P4: patella_l (0.005263583 0.00260021 -3.15815e-5)
      PathPoint P5: tibia_l (0.03325564 -0.06438945 0.0004794525)
      PathWrap: wrap_object=KnExt_at_fem_l method=hybrid
    Millard2012EquilibriumMuscle sart_l: max_isometric_force=249.4131 optimal_fiber_length=0.4206104
        tendon_slack_length=0.1294186 pennation_angle_at_optimal=0.02613542 ignore_tendon_compliance=true
      PathPoint P1: pelvis (-0.02138273 -0.01710618 -0.1157957)
      PathPoint P2: femur_l (-0.00315815 -0.3756093 0.04431937)
      PathPoint P3: tibia_l (-0.0256048 -0.04090648 0.03723408)
      PathPoint P4: tibia_l (-0.01621978 -0.06110469 0.02693095)
      PathPoint P5: tibia_l (0.01387352 -0.08262905 0.00265229)
    Millard2012EquilibriumMuscle semimem_l: max_isometric_force=2200.987 optimal_fiber_length=0.08958465
        tendon_slack_length=0.3489635 pennation_angle_at_optimal=0.2545615
      PathPoint P1: pelvis (-0.1082295 -0.1250067 -0.06732818)
      PathPoint P2: tibia_l (-0.02754302 -0.04182458 0.01999419)
      PathWrap: wrap_object=SM_at_condyles_l method=hybrid
    Millard2012EquilibriumMuscle semiten_l: max_isometric_force=591.2951 optimal_fiber_length=0.2000756
        tendon_slack_length=0.2562626 pennation_angle_at_optimal=0.241295
      PathPoint P1: pelvis (-0.1138219 -0.1373977 -0.05647234)
      PathPoint P2: tibia_l (-0.03182748 -0.05182167 0.02336056)
      PathPoint P3: tibia_l (0.001938212 -0.07885463 0.01193531)
      PathWrap: wrap_object=ST_at_condyles_l method=hybrid
    Millard2012EquilibriumMuscle soleus_l: max_isometric_force=6194.843 optimal_fiber_length=0.04495264
        tendon_slack_length=0.2874415 pennation_angle_at_optimal=0.3814289
      PathPoint P1: tibia_l (-0.007752849 -0.09344223 -0.009997094)
      PathPoint P2: calcn_l (0.004487233 0.0316146 0.005405077)
    Millard2012EquilibriumMuscle tfl_l: max_isometric_force=411.2066 optimal_fiber_length=0.09910359
        tendon_slack_length=0.4689201 pennation_angle_at_optimal=0.05235988
      PathPoint P1: pelvis (-0.021931 0.01206205 -0.141455)
      PathPoint P2: femur_l (0.03094987 -0.1047453 -0.06284718)
      PathPoint P3: femur_l (0.01126407 -0.4263502 -0.03410802)
      PathPoint P4: tibia_l (0.01101721 -0.04182458 -0.03529586)
    Millard2012EquilibriumMuscle tibant_l: max_isometric_force=1227.452 optimal_fiber_length=0.06949096
        tendon_slack_length=0.244654 pennation_angle_at_optimal=0.1951828
      PathPoint P1: tibia_l (0.01570972 -0.1338387 -0.01652581)
      PathPoint P2: tibia_l (0.0256048 -0.1944333 -0.01305743)
      PathPoint P3: tibia_l (0.0237686 -0.3732589 0.01346547)
      PathPoint P4: calcn_l (0.1189117 0.0181529 0.03110469)
    Millard2012EquilibriumMuscle tibpost_l: max_isometric_force=1730.154 optimal_fiber_length=0.03845806
        tendon_slack_length=0.2856677 pennation_angle_at_optimal=0.2264891
      PathPoint P1: tibia_l (-0.004182458 -0.1330226 -0.01050715)
      PathPoint P2: tibia_l (-0.01672983 -0.3728508 0.01785195)
      PathPoint P3: calcn_l (0.04252674 0.03406218 0.02916702)
      PathPoint P4: calcn_l (0.07873055 0.01621523 0.0286571)
    Millard2012EquilibriumMuscle vasint_l: max_isometric_force=1697.361 optimal_fiber_length=0.1222721
        tendon_slack_length=0.2142374 pennation_angle_at_optimal=0.06309973
      PathPoint P1: femur_l (0.03052878 -0.2025427 -0.03263421)
      PathPoint P2: femur_l (0.035266 -0.2193861 -0.03000242)
      PathPoint P3: patella_l (0.006105756 0.05053039 0.0006316299)
      PathPoint P4: patella_l (0.005263583 0.00260021 0.0004105594)
      PathPoint P5: tibia_l (0.03322504 -0.06447106 -0.000438648)
      PathWrap: wrap_object=KnExt_at_fem_l method=hybrid
    Millard2012EquilibriumMuscle vaslat_l: max_isometric_force=5148.767 optimal_fiber_length=0.1226045
        tendon_slack_length=0.2315863 pennation_angle_at_optimal=0.2528673
      PathPoint P1: femur_l (0.005053039 -0.1951736 -0.03673981)
      PathPoint P2: femur_l (0.02831807 -0.2727589 -0.04305611)
      PathPoint P3: patella_l (0.01084298 0.04452991 -0.0148433)
      PathPoint P4: patella_l (0.005263583 0.00260021 -0.007716412)
      PathPoint P5: tibia_l (0.03319443 -0.06465468 -0.005212771)
      PathWrap: wrap_object=KnExtVL_at_fem_l method=hybrid
    Millard2012EquilibriumMuscle vasmed_l: max_isometric_force=2747.823 optimal_fiber_length=0.1145082
        tendon_slack_length=0.2165246 pennation_angle_at_optimal=0.4222225
      PathPoint P1: femur_l (0.01473803 -0.2209652 -0.01979107)
      PathPoint P2: femur_l (0.03747671 -0.2914972 -0.0009474449)
      PathPoint P3: patella_l (0.006632114 0.04684589 0.01789618)
      PathPoint P4: patella_l (0.005263583 0.00260021 0.008948091)
      PathPoint P5: tibia_l (0.03254156 -0.0648485 0.006916357)
      PathWrap: wrap_object=KnExt_at_fem_l method=hybrid
    CoordinateActuator lumbar_ext: coordinate=lumbar_extension optimal_force=10
    CoordinateActuator lumbar_bend: coordinate=lumbar_bending optimal_force=10
    CoordinateActuator lumbar_rot: coordinate=lumbar_rotation optimal_force=10
    CoordinateActuator shoulder_flex_r: coordinate=arm_flex_r optimal_force=10
    CoordinateActuator shoulder_add_r: coordinate=arm_add_r optimal_force=10
    CoordinateActuator shoulder_rot_r: coordinate=arm_rot_r optimal_force=10
    CoordinateActuator elbow_flex_r: coordinate=elbow_flex_r optimal_force=10
    CoordinateActuator pro_sup_r: coordinate=pro_sup_r optimal_force=10
    CoordinateActuator wrist_flex_r: coordinate=wrist_flex_r optimal_force=10
    CoordinateActuator wrist_dev_r: coordinate=wrist_dev_r optimal_force=10
    CoordinateActuator shoulder_flex_l: coordinate=arm_flex_l optimal_force=10
    CoordinateActuator shoulder_add_l: coordinate=arm_add_l optimal_force=10
    CoordinateActuator shoulder_rot_l: coordinate=arm_rot_l optimal_force=10
    CoordinateActuator elbow_flex_l: coordinate=elbow_flex_l optimal_force=10
    CoordinateActuator pro_sup_l: coordinate=pro_sup_l optimal_force=10
    CoordinateActuator wrist_flex_l: coordinate=wrist_flex_l optimal_force=10
    CoordinateActuator wrist_dev_l: coordinate=wrist_dev_l optimal_force=10
    PointActuator [values shared by the 12 below unless stated]: point=(0 0 0) point_is_global=false
        force_is_global=true optimal_force=1
    PointActuator: body=calcn_r direction=(1 0 0)
    PointActuator pointactuator_0: body=calcn_r direction=(0 1 0)
    PointActuator pointactuator_1: body=calcn_r direction=(0 0 1)
    PointActuator pointactuator_2: body=toes_r direction=(1 0 0)
    PointActuator pointactuator_3: body=toes_r direction=(0 1 0)
    PointActuator pointactuator_4: body=toes_r direction=(0 0 1)
    TorqueActuator [values shared by the 12 below unless stated]: bodyB=ground torque_is_global=true optimal_force=1
    TorqueActuator: bodyA=calcn_r axis=(1 0 0)
    TorqueActuator torqueactuator_0: bodyA=calcn_r axis=(0 1 0)
    TorqueActuator torqueactuator_1: bodyA=calcn_r axis=(0 0 1)
    TorqueActuator torqueactuator_2: bodyA=toes_r axis=(1 0 0)
    TorqueActuator torqueactuator_3: bodyA=toes_r axis=(0 1 0)
    TorqueActuator torqueactuator_4: bodyA=toes_r axis=(0 0 1)
    PointActuator pointactuator_5: body=calcn_l direction=(1 0 0)
    PointActuator pointactuator_6: body=calcn_l direction=(0 1 0)
    PointActuator pointactuator_7: body=calcn_l direction=(0 0 1)
    PointActuator pointactuator_8: body=toes_l direction=(1 0 0)
    PointActuator pointactuator_9: body=toes_l direction=(0 1 0)
    PointActuator pointactuator_10: body=toes_l direction=(0 0 1)
    TorqueActuator torqueactuator_5: bodyA=calcn_l axis=(1 0 0)
    TorqueActuator torqueactuator_6: bodyA=calcn_l axis=(0 1 0)
    TorqueActuator torqueactuator_7: bodyA=calcn_l axis=(0 0 1)
    TorqueActuator torqueactuator_8: bodyA=toes_l axis=(1 0 0)
    TorqueActuator torqueactuator_9: bodyA=toes_l axis=(0 1 0)
    TorqueActuator torqueactuator_10: bodyA=toes_l axis=(0 0 1)
    ObjectGroup right_leg: members=(addbrev_r addlong_r addmagDist_r addmagIsch_r addmagMid_r addmagProx_r bflh_r bfsh_r edl_r ehl_r fdl_r fhl_r gaslat_r gasmed_r gem_r glmax1_r glmax2_r glmax3_r glmed1_r glmed2_r glmed3_r glmin1_r glmin2_r glmin3_r grac_r iliacus_r pect_r perbrev_r perlong_r piri_r psoas_r quadfem_r recfem_r sart_r semimem_r semiten_r soleus_r tfl_r tibant_r tibpost_r vasint_r vaslat_r vasmed_r)
    ObjectGroup left_leg: members=(addbrev_l addlong_l addmagDist_l addmagIsch_l addmagMid_l addmagProx_l bflh_l bfsh_l edl_l ehl_l fdl_l fhl_l gaslat_l gasmed_l gem_l glmax1_l glmax2_l glmax3_l glmed1_l glmed2_l glmed3_l glmin1_l glmin2_l glmin3_l grac_l iliacus_l pect_l perbrev_l perlong_l piri_l psoas_l quadfem_l recfem_l sart_l semimem_l semiten_l soleus_l tfl_l tibant_l tibpost_l vasint_l vaslat_l vasmed_l)
    ObjectGroup hip_add_r: members=(addbrev_r addlong_r addmagDist_r addmagIsch_r addmagMid_r addmagProx_r bflh_r grac_r semimem_r semiten_r)
    ObjectGroup hip_abd_r: members=(glmax1_r glmed1_r glmed2_r glmed3_r glmin1_r glmin2_r glmin3_r piri_r sart_r tfl_r)
    ObjectGroup hip_flex_r: members=(addbrev_r addlong_r glmin1_r grac_r iliacus_r psoas_r recfem_r sart_r tfl_r)
    ObjectGroup hip_ext_r: members=(addlong_r addmagDist_r addmagIsch_r addmagMid_r addmagProx_r bflh_r glmax1_r glmax2_r glmax3_r glmed1_r glmed2_r glmed3_r glmin3_r semimem_r semiten_r)
    ObjectGroup hip_inrot_r: members=(glmed1_r glmed2_r glmed3_r glmin1_r iliacus_r psoas_r tfl_r)
    ObjectGroup hip_exrot_r: members=(gem_r glmin3_r piri_r quadfem_r)
    ObjectGroup knee_flex_r: members=(bflh_r bfsh_r gaslat_r gasmed_r grac_r sart_r semimem_r semiten_r)
    ObjectGroup knee_ext_r: members=(recfem_r vasint_r vaslat_r vasmed_r)
    ObjectGroup ankle_df_r: members=(edl_r ehl_r tibant_r)
    ObjectGroup ankle_pf_r: members=(fdl_r fhl_r gaslat_r gasmed_r perbrev_r perlong_r soleus_r tibpost_r)
    ObjectGroup everter_r: members=(edl_r perbrev_r perlong_r)
    ObjectGroup inverter_r: members=(ehl_r fdl_r fhl_r tibant_r tibpost_r)
    ObjectGroup hip_add_l: members=(addbrev_l addlong_l addmagDist_l addmagIsch_l addmagMid_l addmagProx_l bflh_l grac_l semimem_l semiten_l)
    ObjectGroup hip_abd_l: members=(glmax1_l glmed1_l glmed2_l glmed3_l glmin1_l glmin2_l glmin3_l piri_l sart_l tfl_l)
    ObjectGroup hip_flex_l: members=(addbrev_l addlong_l glmin1_l grac_l iliacus_l psoas_l recfem_l sart_l tfl_l)
    ObjectGroup hip_ext_l: members=(addlong_l addmagDist_l addmagIsch_l addmagMid_l addmagProx_l bflh_l glmax1_l glmax2_l glmax3_l glmed1_l glmed2_l glmed3_l glmin3_l semimem_l semiten_l)
    ObjectGroup hip_exrot_l: members=(gem_l glmin3_l piri_l quadfem_l)
    ObjectGroup hip_inrot_l: members=(glmed1_l glmed2_l glmed3_l glmin1_l iliacus_l psoas_l tfl_l)
    ObjectGroup knee_flex_l: members=(bflh_l bfsh_l gaslat_l gasmed_l grac_l sart_l semimem_l semiten_l)
    ObjectGroup knee_ext_l: members=(recfem_l vasint_l vaslat_l vasmed_l)
    ObjectGroup ankle_df_l: members=(edl_l ehl_l tibant_l)
    ObjectGroup ankle_pf_l: members=(fdl_l fhl_l gaslat_l gasmed_l perbrev_l perlong_l soleus_l tibpost_l)
    ObjectGroup everter_l: members=(edl_l perbrev_l perlong_l)
    ObjectGroup inverter_l: members=(ehl_l fdl_l fhl_l tibant_l tibpost_l)
    ObjectGroup HipFlexorsMissingEMGChannelGroupR: members=(iliacus_r psoas_r)
    ObjectGroup HipFlexorsActivationGroupR: members=(iliacus_r psoas_r)
    ObjectGroup HipAdductorsMeasuredEMGChannelGroupR: members=(addbrev_r addlong_r addmagDist_r addmagIsch_r addmagMid_r addmagProx_r pect_r grac_r)
    ObjectGroup HipAdductorsActivationGroupR: members=(addbrev_r addlong_r addmagDist_r addmagIsch_r addmagMid_r addmagProx_r pect_r grac_r)
    ObjectGroup HipAdductorsNormalizedFiberLengthGroupR: members=(addbrev_r addlong_r addmagDist_r addmagIsch_r addmagMid_r addmagProx_r)
    ObjectGroup HipRotatorsMissingEMGChannelGroupR: members=(quadfem_r gem_r piri_r)
    ObjectGroup HipRotatorsActivationGroupR: members=(quadfem_r gem_r piri_r)
    ObjectGroup GlutmaxMeasuredEMGChannelGroupR: members=(glmax1_r glmax2_r glmax3_r)
    ObjectGroup GlutmaxActivationGroupR: members=(glmax1_r glmax2_r glmax3_r)
    ObjectGroup GlutmaxNormalizedFiberLengthGroupR: members=(glmax1_r glmax2_r glmax3_r)
    ObjectGroup GlutmedMeasuredEMGChannelGroupR: members=(glmed1_r glmed2_r glmed3_r)
    ObjectGroup GlutmedActivationGroupR: members=(glmed1_r glmed2_r glmed3_r)
    ObjectGroup GlutmedNormalizedFiberLengthGroupR: members=(glmed1_r glmed2_r glmed3_r)
    ObjectGroup GlutminMeasuredEMGChannelGroupR: members=(glmin1_r glmin2_r glmin3_r)
    ObjectGroup GlutminActivationGroupR: members=(glmin1_r glmin2_r glmin3_r)
    ObjectGroup GlutminNormalizedFiberLengthGroupR: members=(glmin1_r glmin2_r glmin3_r)
    ObjectGroup RecfemMeasuredEMGChannelGroupR: members=recfem_r
    ObjectGroup HamsmedMeasuredEMGChannelGroupR: members=(semimem_r semiten_r)
    ObjectGroup HamsmedActivationGroupR: members=(semimem_r semiten_r)
    ObjectGroup HamslatMeasuredEMGChannelGroupR: members=(bflh_r bfsh_r)
    ObjectGroup HamslatActivationGroupR: members=(bflh_r bfsh_r)
    ObjectGroup HamsNormalizedFiberLengthGroupR: members=(semimem_r semiten_r bflh_r)
    ObjectGroup SartMissingEMGChannelGroupR: members=sart_r
    ObjectGroup TflMeasuredEMGChannelGroupR: members=tfl_r
    ObjectGroup VasmedMeasuredEMGChannelGroupR: members=(vasmed_r vasint_r)
    ObjectGroup VaslatMeasuredEMGChannelGroupR: members=vaslat_r
    ObjectGroup VasActivationGroupR: members=(vasmed_r vasint_r vaslat_r)
    ObjectGroup VasNormalizedFiberLengthGroupR: members=(vasmed_r vasint_r vaslat_r)
    ObjectGroup GasmedMeasuredEMGChannelGroupR: members=gasmed_r
    ObjectGroup GaslatMeasuredEMGChannelGroupR: members=gaslat_r
    ObjectGroup GasActivationGroupR: members=(gasmed_r gaslat_r)
    ObjectGroup GasNormalizedFiberLengthGroupR: members=(gasmed_r gaslat_r)
    ObjectGroup SolMeasuredEMGChannelGroupR: members=soleus_r
    ObjectGroup TibantMeasuredEMGChannelGroupR: members=tibant_r
    ObjectGroup AnkleInvertorsMeasuredEMGChannelGroupR: members=(tibpost_r fdl_r fhl_r)
    ObjectGroup AnkleInvertorsActivationGroupR: members=(tibpost_r fdl_r fhl_r)
    ObjectGroup AnkleInvertorsNormalizedFiberLengthGroupR: members=(fdl_r fhl_r)
    ObjectGroup AnkleEvertorsMeasuredEMGChannelGroupR: members=(perlong_r perbrev_r)
    ObjectGroup AnkleEvertorsActivationGroupR: members=(perlong_r perbrev_r)
    ObjectGroup AnkleEvertorsNormalizedFiberLengthGroupR: members=(perlong_r perbrev_r)
    ObjectGroup ToesExtensorsMissingEMGChannelGroupR: members=(edl_r ehl_r)
    ObjectGroup ToesExtensorsActivationGroupR: members=(edl_r ehl_r)
    ObjectGroup ToesExtensorsNormalizedFiberLengthGroupR: members=(edl_r ehl_r)
    ObjectGroup HipFlexorsMissingEMGChannelGroupL: members=(iliacus_l psoas_l)
    ObjectGroup HipFlexorsActivationGroupL: members=(iliacus_l psoas_l)
    ObjectGroup HipAdductorsMeasuredEMGChannelGroupL: members=(addbrev_l addlong_l addmagDist_l addmagIsch_l addmagMid_l addmagProx_l pect_l grac_l)
    ObjectGroup HipAdductorsActivationGroupL: members=(addbrev_l addlong_l addmagDist_l addmagIsch_l addmagMid_l addmagProx_l pect_l grac_l)
    ObjectGroup HipAdductorsNormalizedFiberLengthGroupL: members=(addbrev_l addlong_l addmagDist_l addmagIsch_l addmagMid_l addmagProx_l)
    ObjectGroup HipRotatorsMissingEMGChannelGroupL: members=(quadfem_l gem_l piri_l)
    ObjectGroup HipRotatorsActivationGroupL: members=(quadfem_l gem_l piri_l)
    ObjectGroup GlutmaxMeasuredEMGChannelGroupL: members=(glmax1_l glmax2_l glmax3_l)
    ObjectGroup GlutmaxActivationGroupL: members=(glmax1_l glmax2_l glmax3_l)
    ObjectGroup GlutmaxNormalizedFiberLengthGroupL: members=(glmax1_l glmax2_l glmax3_l)
    ObjectGroup GlutmedMeasuredEMGChannelGroupL: members=(glmed1_l glmed2_l glmed3_l)
    ObjectGroup GlutmedActivationGroupL: members=(glmed1_l glmed2_l glmed3_l)
    ObjectGroup GlutmedNormalizedFiberLengthGroupL: members=(glmed1_l glmed2_l glmed3_l)
    ObjectGroup GlutminMeasuredEMGChannelGroupL: members=(glmin1_l glmin2_l glmin3_l)
    ObjectGroup GlutminActivationGroupL: members=(glmin1_l glmin2_l glmin3_l)
    ObjectGroup GlutminNormalizedFiberLengthGroupL: members=(glmin1_l glmin2_l glmin3_l)
    ObjectGroup RecfemMeasuredEMGChannelGroupL: members=recfem_l
    ObjectGroup HamsmedMeasuredEMGChannelGroupL: members=(semimem_l semiten_l)
    ObjectGroup HamsmedActivationGroupL: members=(semimem_l semiten_l)
    ObjectGroup HamslatMeasuredEMGChannelGroupL: members=(bflh_l bfsh_l)
    ObjectGroup HamslatActivationGroupL: members=(bflh_l bfsh_l)
    ObjectGroup HamsNormalizedFiberLengthGroupL: members=(semimem_l semiten_l bflh_l)
    ObjectGroup SartMissingEMGChannelGroupL: members=sart_l
    ObjectGroup TflMeasuredEMGChannelGroupL: members=tfl_l
    ObjectGroup VasmedMeasuredEMGChannelGroupL: members=(vasmed_l vasint_l)
    ObjectGroup VaslatMeasuredEMGChannelGroupL: members=vaslat_l
    ObjectGroup VasActivationGroupL: members=(vasmed_l vasint_l vaslat_l)
    ObjectGroup VasNormalizedFiberLengthGroupL: members=(vasmed_l vasint_l vaslat_l)
    ObjectGroup GasmedMeasuredEMGChannelGroupL: members=gasmed_l
    ObjectGroup GaslatMeasuredEMGChannelGroupL: members=gaslat_l
    ObjectGroup GasActivationGroupL: members=(gasmed_l gaslat_l)
    ObjectGroup GasNormalizedFiberLengthGroupL: members=(gasmed_l gaslat_l)
    ObjectGroup SolMeasuredEMGChannelGroupL: members=soleus_l
    ObjectGroup TibantMeasuredEMGChannelGroupL: members=tibant_l
    ObjectGroup AnkleInvertorsMeasuredEMGChannelGroupL: members=(tibpost_l fdl_l fhl_l)
    ObjectGroup AnkleInvertorsActivationGroupL: members=(tibpost_l fdl_l fhl_l)
    ObjectGroup AnkleInvertorsNormalizedFiberLengthGroupL: members=(fdl_l fhl_l)
    ObjectGroup AnkleEvertorsMeasuredEMGChannelGroupL: members=(perlong_l perbrev_l)
    ObjectGroup AnkleEvertorsActivationGroupL: members=(perlong_l perbrev_l)
    ObjectGroup AnkleEvertorsNormalizedFiberLengthGroupL: members=(perlong_l perbrev_l)
    ObjectGroup ToesExtensorsMissingEMGChannelGroupL: members=(edl_l ehl_l)
    ObjectGroup ToesExtensorsActivationGroupL: members=(edl_l ehl_l)
    ObjectGroup ToesExtensorsNormalizedFiberLengthGroupL: members=(edl_l ehl_l)
  MarkerSet:
    Marker R_Shoulder: torso (-0.06373405 0.3340592 0.1877028)
    Marker L_Shoulder: torso (-0.05470841 0.3516086 -0.1753064)
    Marker Chest: torso (0.07499118 0.3073179 0.0015273)
    Marker BackC: torso (-0.08374231 0.3753944 -0.001223832)
    Marker R_Elbow: radius_r (-0.00469465 -0.0008751606 -0.0133992)
    Marker L_Elbow: radius_l (-1.043005e-5 0.008539183 0.006198666)
    Marker R_Wrist: radius_r (-0.03737067 -0.25429 0.00304749)
    Marker L_Wrist: radius_l (-0.03644465 -0.2377421 -0.005089649)
    Marker R_ASIS: pelvis (0.01350918 0.005511869 0.1265231)
    Marker L_ASIS: pelvis (0.02041025 0.004593687 -0.1305)
    Marker Sacral: pelvis (-0.183938 0.03229958 0.003882095)
    Marker Sacral2: pelvis (-0.1761338 0.03271283 0.07223691)
    Marker Sacral3: pelvis (-0.177174 0.02834502 -0.07384158)
    Marker R_Thigh_Superior: femur_r (0.06112434 -0.131881 0.09448287)
    Marker R_Thigh_Inferior: femur_r (0.05856079 -0.2279899 0.09195461)
    Marker R_Thigh_Lateral: femur_r (-0.01329134 -0.2285579 0.09544323)
    Marker R_Thigh_Posterior: femur_r (-0.01401522 -0.1285569 0.1014124)
    Marker R_Knee_Lateral: femur_r (-0.006228988 -0.4086059 0.05505577)
    Marker R_Knee_Medial: femur_r (-0.006925393 -0.4056444 -0.05501685)
    Marker R_Patella: patella_r (0.01092728 0.03897815 -0.009936958)
    Marker R_Shank_Superior: tibia_r (0.01995201 -0.1246282 0.07840373)
    Marker R_Shank_Inferior: tibia_r (0.02008153 -0.1848438 0.07395375)
    Marker R_Shank_Lateral: tibia_r (-0.0509661 -0.1932418 0.08620229)
    Marker R_Shank_Posterior: tibia_r (-0.05552181 -0.1224136 0.09035326)
    Marker R_Ankle_Lateral: tibia_r (-0.02324634 -0.4018291 0.0547878)
    Marker R_Ankle_Medial: tibia_r (0.004450833 -0.3755838 -0.03171989)
    Marker R_Heel: calcn_r (-0.02741469 0.02391306 -0.008966049)
    Marker R_Toe: toes_r (0.08920386 0.008536541 0.005128581)
    Marker R_Toe_Lateral: calcn_r (0.1707206 -0.005486766 0.07317445)
    Marker R_Toe_Medial: calcn_r (0.1840201 8.653004e-5 -0.05426532)
    Marker R_Midfoot_Superior: calcn_r (0.1433225 0.06598775 0.008142267)
    Marker R_Midfoot_Lateral: calcn_r (0.07395848 -0.009047768 0.05637988)
    Marker L_Thigh_Superior: femur_l (0.05427942 -0.1616765 -0.1123538)
    Marker L_Thigh_Inferior: femur_l (0.05925908 -0.2546051 -0.0976529)
    Marker L_Thigh_Lateral: femur_l (-0.01997639 -0.2564392 -0.09174012)
    Marker L_Thigh_Posterior: femur_l (-0.02017425 -0.1681514 -0.1059278)
    Marker L_Knee_Lateral: femur_l (0.005140309 -0.4177823 -0.05518035)
    Marker L_Knee_Medial: femur_l (-0.003488587 -0.4080723 0.04638218)
    Marker L_Patella: patella_l (0.006649432 0.02770606 -0.002703272)
    Marker L_Shank_Superior: tibia_l (0.01624754 -0.1062466 -0.0789583)
    Marker L_Shank_Inferior: tibia_l (0.007573396 -0.1638434 -0.08542188)
    Marker L_Shank_Lateral: tibia_l (-0.05931284 -0.1634136 -0.09177436)
    Marker L_Shank_Posterior: tibia_l (-0.05880193 -0.09188335 -0.08412673)
    Marker L_Ankle_Lateral: tibia_l (-0.02550616 -0.3989943 -0.0512881)
    Marker L_Ankle_Medial: tibia_l (0.003605793 -0.3697064 0.03652677)
    Marker L_Heel: calcn_l (-0.02847321 0.01598104 0.007929418)
    Marker L_Toe: toes_l (0.08883155 0.005627975 -0.004654897)
    Marker L_Toe_Lateral: calcn_l (0.1718647 -0.004850309 -0.07156501)
    Marker L_Toe_Medial: calcn_l (0.1932259 0.0004547029 0.055876)
    Marker L_Midfoot_Superior: calcn_l (0.1434861 0.06633682 -0.007249701)
    Marker L_Midfoot_Lateral: calcn_l (0.07424542 0.002133244 -0.05691)
