# OpenSim document version 40500
InverseKinematicsTool:
  time_range: 0 4
  output_motion_file: Trial12_Gait_IK_results.mot
  marker_file: Trial12_Gait_markers.trc
  IKTaskSet:
    IKMarkerTask R_Shoulder: apply=false weight=1
    IKMarkerTask L_Shoulder: apply=false weight=1
    IKMarkerTask Chest: apply=true weight=1
    IKMarkerTask BackC: apply=false weight=1
    IKMarkerTask R_Elbow: apply=true weight=1
    IKMarkerTask L_Elbow: apply=true weight=1
    IKMarkerTask R_Wrist: apply=true weight=1
    IKMarkerTask L_Wrist: apply=true weight=1
    IKMarkerTask R_ASIS: apply=true weight=1
    IKMarkerTask L_ASIS: apply=true weight=1
    IKMarkerTask Sacral: apply=true weight=1
    IKMarkerTask Sacral2: apply=false weight=1
    IKMarkerTask Sacral3: apply=false weight=1
    IKMarkerTask R_Thigh_Superior: apply=true weight=0.1
    IKMarkerTask R_Thigh_Inferior: apply=true weight=0.1
    IKMarkerTask R_Thigh_Lateral: apply=true weight=0.1
    IKMarkerTask R_Thigh_Posterior: apply=true weight=0.1
    IKMarkerTask R_Knee_Lateral: apply=false weight=1
    IKMarkerTask R_Knee_Medial: apply=false weight=1
    IKMarkerTask R_Patella: apply=false weight=1
    IKMarkerTask R_Shank_Superior: apply=true weight=1
    IKMarkerTask R_Shank_Inferior: apply=true weight=1
    IKMarkerTask R_Shank_Lateral: apply=true weight=1
    IKMarkerTask R_Shank_Posterior: apply=true weight=1
    IKMarkerTask R_Ankle_Lateral: apply=false weight=1
    IKMarkerTask R_Ankle_Medial: apply=false weight=1
    IKMarkerTask R_Heel: apply=true weight=10
    IKMarkerTask R_Toe: apply=true weight=10
    IKMarkerTask R_Toe_Lateral: apply=false weight=1
    IKMarkerTask R_Toe_Medial: apply=false weight=1
    IKMarkerTask R_Midfoot_Superior: apply=true weight=10
    IKMarkerTask R_Midfoot_Lateral: apply=true weight=10
    IKMarkerTask L_Thigh_Superior: apply=true weight=0.1
    IKMarkerTask L_Thigh_Inferior: apply=true weight=0.1
    IKMarkerTask L_Thigh_Lateral: apply=true weight=0.1
    IKMarkerTask L_Thigh_Posterior: apply=true weight=0.1
    IKMarkerTask L_Knee_Lateral: apply=false weight=1
    IKMarkerTask L_Knee_Medial: apply=false weight=1
    IKMarkerTask L_Patella: apply=false weight=1
    IKMarkerTask L_Shank_Superior: apply=true weight=1
    IKMarkerTask L_Shank_Inferior: apply=true weight=1
    IKMarkerTask L_Shank_Lateral: apply=true weight=1
    IKMarkerTask L_Shank_Posterior: apply=true weight=1
    IKMarkerTask L_Ankle_Lateral: apply=false weight=1
    IKMarkerTask L_Ankle_Medial: apply=false weight=1
    IKMarkerTask L_Heel: apply=true weight=10
    IKMarkerTask L_Toe: apply=true weight=10
    IKMarkerTask L_Toe_Lateral: apply=false weight=1
    IKMarkerTask L_Toe_Medial: apply=false weight=1
    IKMarkerTask L_Midfoot_Superior: apply=true weight=10
    IKMarkerTask L_Midfoot_Lateral: apply=true weight=10
    IKCoordinateTask lumbar_rotation: apply=true weight=0.1 value_type=manual_value value=0
