# OpenSim document version 40500
ScaleTool Feet_Only_Walking_Model-Scaled:
  mass: 2.9332 [kg]
  height: -1
  age: -1
  ModelScaler:
    apply: true
    scaling_order: measurements manualScale
    marker_file: Trial04_Static_markers_reordered.trc
    time_range: 2 2.1
    preserve_mass_distribution: true
    MeasurementSet:
      Measurement FootLength: apply=true
        MarkerPair: markers=(R_Heel R_Toe)
        MarkerPair: markers=(L_Heel L_Toe)
        BodyScale calcn_r: axes=(X Y Z)
        BodyScale toes_r: axes=(X Y Z)
        BodyScale calcn_l: axes=(X Y Z)
        BodyScale toes_l: axes=(X Y Z)
    ScaleSet:
      Scale: scales=(1.019826 1.019826 1.019826) segment=calcn_r apply=false
  MarkerPlacer:
    apply: true
    marker_file: Trial04_Static_markers_reordered.trc
    time_range: 2 2.1
    max_marker_movement: -1
    IKTaskSet:
      IKMarkerTask R_Heel: apply=true weight=1
      IKMarkerTask R_Toe: apply=true weight=10
      IKMarkerTask R_Toe_Lateral: apply=false weight=1
      IKMarkerTask R_Toe_Medial: apply=false weight=1
      IKMarkerTask R_Midfoot_Superior: apply=false weight=1
      IKMarkerTask R_Midfoot_Lateral: apply=false weight=1
      IKMarkerTask L_Heel: apply=true weight=1
      IKMarkerTask L_Toe: apply=true weight=10
      IKMarkerTask L_Toe_Lateral: apply=false weight=1
      IKMarkerTask L_Toe_Medial: apply=false weight=1
      IKMarkerTask L_Midfoot_Superior: apply=false weight=1
      IKMarkerTask L_Midfoot_Lateral: apply=false weight=1
