# OpenSim document version 40500
ScaleTool Full_Body_Walking_Model-Scaled:
  mass: 72.8 [kg]
  height: -1
  age: -1
  ModelScaler:
    apply: true
    scaling_order: measurements manualScale
    marker_file: Trial04_Static_markers_reordered.trc
    time_range: 2 2.1
    preserve_mass_distribution: true
    MeasurementSet:
      Measurement PelvisWidth: apply=true
        MarkerPair: markers=(R_ASIS L_ASIS)
        BodyScale pelvis: axes=(X Y Z)
      Measurement FemurLengthR: apply=true
        MarkerPair: markers=(R_ASIS R_Knee_Lateral)
        BodyScale femur_r: axes=(X Y Z)
        BodyScale patella_r: axes=(X Y Z)
      Measurement TibiaLengthR: apply=true
        MarkerPair: markers=(R_Knee_Lateral R_Ankle_Lateral)
        BodyScale proximal_tibia_r: axes=(X Y Z)
        BodyScale tibia_r: axes=(X Y Z)
      Measurement FemurLengthL: apply=true
        MarkerPair: markers=(L_ASIS L_Knee_Lateral)
        BodyScale femur_l: axes=(X Y Z)
        BodyScale patella_l: axes=(X Y Z)
      Measurement TibiaLengthL: apply=true
        MarkerPair: markers=(L_Knee_Lateral L_Ankle_Lateral)
        BodyScale proximal_tibia_l: axes=(X Y Z)
        BodyScale tibia_l: axes=(X Y Z)
      Measurement ForearmLength: apply=true
        MarkerPair: markers=(R_Elbow R_Wrist)
        MarkerPair: markers=(L_Elbow L_Wrist)
        BodyScale ulna_r: axes=(X Y Z)
        BodyScale radius_r: axes=(X Y Z)
        BodyScale hand_r: axes=(X Y Z)
        BodyScale ulna_l: axes=(X Y Z)
        BodyScale radius_l: axes=(X Y Z)
        BodyScale hand_l: axes=(X Y Z)
      Measurement FootLength: apply=true
        MarkerPair: markers=(R_Heel R_Toe)
        MarkerPair: markers=(L_Heel L_Toe)
        BodyScale talus_r: axes=(X Y Z)
        BodyScale calcn_r: axes=(X Y Z)
        BodyScale toes_r: axes=(X Y Z)
        BodyScale talus_l: axes=(X Y Z)
        BodyScale calcn_l: axes=(X Y Z)
        BodyScale toes_l: axes=(X Y Z)
    ScaleSet:
      Scale: scales=(0.9 0.9 0.9) segment=torso apply=true
      Scale: scales=(1.1 1.1 1.1) segment=humerus_r apply=true
      Scale: scales=(1.1 1.1 1.1) segment=humerus_l apply=true
  MarkerPlacer:
    apply: true
    marker_file: Trial04_Static_markers_reordered.trc
    time_range: 2 2.1
    max_marker_movement: -1
    IKTaskSet:
      IKMarkerTask R_Shoulder: apply=false weight=0.1
      IKMarkerTask L_Shoulder: apply=false weight=0.1
      IKMarkerTask Chest: apply=true weight=1
      IKMarkerTask BackC: apply=false weight=1
      IKMarkerTask R_Elbow: apply=true weight=1
      IKMarkerTask L_Elbow: apply=true weight=1
      IKMarkerTask R_Wrist: apply=true weight=1
      IKMarkerTask L_Wrist: apply=true weight=1
      IKMarkerTask R_ASIS: apply=true weight=10
      IKMarkerTask L_ASIS: apply=true weight=10
      IKMarkerTask Sacral: apply=true weight=10
      IKMarkerTask Sacral2: apply=false weight=1
      IKMarkerTask Sacral3: apply=false weight=1
      IKMarkerTask R_Thigh_Superior: apply=false weight=1
      IKMarkerTask R_Thigh_Inferior: apply=false weight=1
      IKMarkerTask R_Thigh_Lateral: apply=false weight=1
      IKMarkerTask R_Thigh_Posterior: apply=false weight=1
      IKMarkerTask R_Knee_Lateral: apply=true weight=1
      IKMarkerTask R_Knee_Medial: apply=true weight=1
      IKMarkerTask R_Patella: apply=false weight=1
      IKMarkerTask R_Shank_Superior: apply=false weight=1
      IKMarkerTask R_Shank_Inferior: apply=false weight=1
      IKMarkerTask R_Shank_Lateral: apply=false weight=1
      IKMarkerTask R_Shank_Posterior: apply=false weight=1
      IKMarkerTask R_Ankle_Lateral: apply=true weight=1
      IKMarkerTask R_Ankle_Medial: apply=true weight=1
      IKMarkerTask R_Heel: apply=true weight=10
      IKMarkerTask R_Toe: apply=true weight=10
      IKMarkerTask R_Toe_Lateral: apply=false weight=10
      IKMarkerTask R_Toe_Medial: apply=false weight=10
      IKMarkerTask R_Midfoot_Superior: apply=false weight=10
      IKMarkerTask R_Midfoot_Lateral: apply=false weight=10
      IKMarkerTask L_Thigh_Superior: apply=false weight=1
      IKMarkerTask L_Thigh_Inferior: apply=false weight=1
      IKMarkerTask L_Thigh_Lateral: apply=false weight=1
      IKMarkerTask L_Thigh_Posterior: apply=false weight=1
      IKMarkerTask L_Knee_Lateral: apply=true weight=1
      IKMarkerTask L_Knee_Medial: apply=true weight=1
      IKMarkerTask L_Patella: apply=false weight=1
      IKMarkerTask L_Shank_Superior: apply=false weight=1
      IKMarkerTask L_Shank_Inferior: apply=false weight=1
      IKMarkerTask L_Shank_Lateral: apply=false weight=1
      IKMarkerTask L_Shank_Posterior: apply=false weight=1
      IKMarkerTask L_Ankle_Lateral: apply=true weight=1
      IKMarkerTask L_Ankle_Medial: apply=true weight=1
      IKMarkerTask L_Heel: apply=true weight=10
      IKMarkerTask L_Toe: apply=true weight=10
      IKMarkerTask L_Toe_Lateral: apply=false weight=10
      IKMarkerTask L_Toe_Medial: apply=false weight=10
      IKMarkerTask L_Midfoot_Superior: apply=false weight=10
      IKMarkerTask L_Midfoot_Lateral: apply=false weight=10
