# OpenSim document version 40500
Model:
  gravity: 0 -9.80665 0
  length_units: meters
  force_units: N
  credits:
    Rice Computational Neuromechanics Lab (RCNL): B.J. Fregly, Geng Li, Spencer T. Williams, Claire V. Hammond, Marleny M. Vega, Di Ao, Robert M. Salati, Kayla M. Pariser, Mohammad S. Shourijeh, and Ayman W. Habib. This model was created for use in the RCNL Neuromusculoskeletal Modeling Pipeline software.
  publications:
    This full-body model is a modified version of the one provided with the following publications:
  publications:
    Rajagopal, A., Dembia, C.L., DeMers, M.S., Delp, D.D., Hicks, J.L., Delp, S.L. (2016) Full-body musculoskeletal model for muscle-driven simulation of human gait. IEEE Transactions on Biomedical Engineering.
  publications:
    Lai, A.K.M., Arnold, A.S., Wakeling, J.M. (2017) Why are antagonist muscles co-activated in my simulation? A musculoskeletal model for analysing human locomotor tasks. Annals of Biomedical Engineering.
  publications:
    Uhlrich, S.D., Jackson, R.W., Seth, A., Kolesar, J.A., Delp, S.L. (2022) Muscle coordination retraining inspired by musculoskeletal simulations reduces knee contact force. Scientific Reports.
  Ground
  BodySet:
    Body calcn_r: mass=1.25 [kg] mass_center=(0.1 0.03 0) inertia=(0.0014 0.0039 0.0041 0 0 0) meshes=r_foot.vtp
    Body toes_r: mass=0.2166 mass_center=(0.0346 0.006 -0.0175) inertia=(0.0001 0.0002 0.001 0 0 0) meshes=r_bofoot.vtp
    Body calcn_l: mass=1.25 mass_center=(0.1 0.03 0) inertia=(0.0014 0.0039 0.0041 0 0 0) meshes=l_foot.vtp
    Body toes_l: mass=0.2166 mass_center=(0.0346 0.006 0.0175) inertia=(0.0001 0.0002 0.001 0 0 0) meshes=l_bofoot.vtp
  JointSet:
    CustomJoint ground_calcn_r: socket_parent_frame=ground_offset socket_child_frame=calcn_r_offset
      Coordinate calcn_r_rx: default_value=0 range=(-1.570796 1.570796) clamped=false locked=true
      Coordinate calcn_r_ry: default_value=0 range=(-1.570796 1.570796) clamped=false
      Coordinate calcn_r_rz: default_value=0 range=(-1.570796 1.570796) clamped=false locked=true
      Coordinate calcn_r_tx: default_value=-0.113 range=(-5 5) clamped=false
      Coordinate calcn_r_ty: default_value=0 range=(-5 5) clamped=false
      Coordinate calcn_r_tz: default_value=0.075 range=(-5 5) clamped=false
      PhysicalOffsetFrame ground_offset: socket_parent=/ground translation=(0 0 0) [meters]
      PhysicalOffsetFrame calcn_r_offset: socket_parent=/bodyset/calcn_r translation=(0 0 0)
      SpatialTransform:
        TransformAxis rotation1: coordinates=calcn_r_rx axis=(-1 0 0) LinearFunction(coefficients=1 0)
        TransformAxis rotation2: coordinates=calcn_r_ry axis=(0 -1 0) LinearFunction(coefficients=1 0)
        TransformAxis rotation3: coordinates=calcn_r_rz axis=(0 0 1) LinearFunction(coefficients=1 0)
        TransformAxis translation1: coordinates=calcn_r_tx axis=(1 0 0) LinearFunction(coefficients=1 0)
        TransformAxis translation2: coordinates=calcn_r_ty axis=(0 1 0) LinearFunction(coefficients=1 0)
        TransformAxis translation3: coordinates=calcn_r_tz axis=(0 0 1) LinearFunction(coefficients=1 0)
    PinJoint mtp_r: socket_parent_frame=calcn_r_offset socket_child_frame=toes_r_offset
      Coordinate mtp_angle_r: default_value=-0.1745329 range=(-0.7853982 0.5235988) clamped=true locked=true
      PhysicalOffsetFrame calcn_r_offset: socket_parent=/bodyset/calcn_r translation=(0.1788 -0.002 0.00108)
          orientation=(-3.141593 0.619901 0) [radians]
      PhysicalOffsetFrame toes_r_offset: socket_parent=/bodyset/toes_r translation=(0 0 0)
          orientation=(-3.14159 0.619901 0)
    CustomJoint ground_calcn_l: socket_parent_frame=ground_offset socket_child_frame=calcn_l_offset
      Coordinate calcn_l_rx: default_value=0 range=(-1.570796 1.570796) clamped=false locked=true
      Coordinate calcn_l_ry: default_value=0 range=(-1.570796 1.570796) clamped=false
      Coordinate calcn_l_rz: default_value=0 range=(-1.570796 1.570796) clamped=false locked=true
      Coordinate calcn_l_tx: default_value=-0.113 range=(-5 5) clamped=false
      Coordinate calcn_l_ty: default_value=0 range=(-5 5) clamped=false
      Coordinate calcn_l_tz: default_value=-0.075 range=(-5 5) clamped=false
      PhysicalOffsetFrame ground_offset: socket_parent=/ground translation=(0 0 0)
      PhysicalOffsetFrame calcn_l_offset: socket_parent=/bodyset/calcn_l translation=(0 0 0)
      SpatialTransform:
        TransformAxis rotation1: coordinates=calcn_l_rx axis=(1 0 0) LinearFunction(coefficients=1 0)
        TransformAxis rotation2: coordinates=calcn_l_ry axis=(0 1 0) LinearFunction(coefficients=1 0)
        TransformAxis rotation3: coordinates=calcn_l_rz axis=(0 0 1) LinearFunction(coefficients=1 0)
        TransformAxis translation1: coordinates=calcn_l_tx axis=(1 0 0) LinearFunction(coefficients=1 0)
        TransformAxis translation2: coordinates=calcn_l_ty axis=(0 1 0) LinearFunction(coefficients=1 0)
        TransformAxis translation3: coordinates=calcn_l_tz axis=(0 0 1) LinearFunction(coefficients=1 0)
    PinJoint mtp_l: socket_parent_frame=calcn_l_offset socket_child_frame=toes_l_offset
      Coordinate mtp_angle_l: default_value=-0.1745329 range=(-0.7853982 0.5235988) clamped=true locked=true
      PhysicalOffsetFrame calcn_l_offset: socket_parent=/bodyset/calcn_l translation=(0.1788 -0.002 -0.00108)
          orientation=(-3.14159 -0.619901 0)
      PhysicalOffsetFrame toes_l_offset: socket_parent=/bodyset/toes_l translation=(0 0 0)
          orientation=(-3.14159 -0.619901 0)
  ConstraintSet:
    CoordinateCouplerConstraint ground_calcn_l_ty_con: independent_coordinate_names=calcn_r_ty
        dependent_coordinate_name=calcn_l_ty scale_factor=1
        coupled_coordinates_function=LinearFunction(coefficients=1 0)
  MarkerSet:
    Marker R_Heel: calcn_r (-0.0275375 0.020016 -0.00865795)
    Marker R_Toe: toes_r (0.087113 0.0067512 0.004698)
    Marker R_Toe_Lateral: calcn_r (0.16686 -0.0038221 0.0685945)
    Marker R_Toe_Medial: calcn_r (0.18359 0.00137455 -0.052609)
    Marker R_Midfoot_Superior: calcn_r (0.14041 0.0640175 0.00705305)
    Marker R_Midfoot_Lateral: calcn_r (0.074405 -0.002237 0.053507)
    Marker L_Heel: calcn_l (-0.0275375 0.020016 0.00865795)
    Marker L_Toe: toes_l (0.087113 0.0067512 -0.004698)
    Marker L_Toe_Lateral: calcn_l (0.16686 -0.0038221 -0.0685945)
    Marker L_Toe_Medial: calcn_l (0.18359 0.00137455 0.052609)
    Marker L_Midfoot_Superior: calcn_l (0.14041 0.0640175 -0.00705305)
    Marker L_Midfoot_Lateral: calcn_l (0.074405 -0.002237 -0.053507)
